# Title: Wall steel and annular pile rings
# Description: Fixed scalar units: inches, kip, ksi, with density in kip/ft^3 and areas per foot as labeled. Units are labels, not native dimensional quantities. This sheet recomputes the exported topology. Regenerate after changing pile/row counts, bar size/coating, automatic spacing, or contact assumptions. Two continuous top/bottom fillets. Values are not design acceptance. Case bc5d7e9701d2.
## Wall steel and annular pile rings
# Fixed scalar units: inches, kip, ksi, with density in kip/ft^3 and areas per foot as labeled. Units are labels, not native dimensional quantities. This sheet recomputes the exported topology. Regenerate after changing pile/row counts, bar size/coating, automatic spacing, or contact assumptions. Two continuous top/bottom fillets. Values are not design acceptance. Case bc5d7e9701d2.
# SHARING: Midplane tributaries assign vertical force and the ring rows share the pile-head moment equally; all rings are assumed to engage. Concrete transfer (including concrete below rings), splitting/breakout and row compatibility need a separately substantiated load path.
# STIFFNESS: Ring moments follow pile-head rotational stiffness against the rigid-wall rotation (D-070). The free length to fixity and the axial spring length are entered values (defaults from the pier pile case with sand depth to fixity, LRFD 10.7.3.13.4; tip elevation pending). Lateral, thermal, unsymmetric and construction-stage rotations enter only through the imposed rotation input.
# SCOPE: Wall checks cover minimum shrinkage/temperature steel and detailing only. Wall flexure, shear, lateral loads, seismic and strength load paths are outside this calculation.
# CONNECTION: Local plate and double-fillet checks do not establish pipe-shell bending/ovalization, global pile interaction, ring-segment splices, fatigue, corrosion or WPS/fabrication adequacy.
# BASIS: Confirm exposure/cover, material grades, construction joints and bar anchorage routing. Starting dimensions follow the CAD pier wall (219 x 36 in, bottom 1 ft below terrain at EL 24.5264, top at the cap bottom); the geometry notebook does not yet own the pier wall. The ring plate is 1/2 in by user selection (D-078; the thinnest plate with every check at or under 0.95 of its limit is 7/16 in, set by the maximum fillet at the ring edge); the CAD rings (D-076) are 3/4 in until reconciled.
v_0001 := 3  # schema version [—]
v_0002 := 219  # length in [in]
v_0003 := 36  # thickness in [in]
v_0004 := 194.8625  # height in [in]
v_0005 := 4  # pile count [—]
v_0006 := 60  # pile spacing in [in]
v_0007 := 20  # pile od in [in]
v_0008 := 0.475  # pile t effective in [in]
v_0009 := 50  # pile fy ksi [ksi]
v_0010 := 65  # pile fu ksi [ksi]
v_0011 := 3  # placement tolerance in [in]
v_0012 := 29000  # pile e ksi [ksi]
v_0013 := 92.4  # pile free length in [in]
v_0014 := 600  # pile axial length in [in]
v_0015 := 0  # imposed rotation rad [rad]
v_0016 := 3  # cover in [in]
v_0017 := 3  # required cover in [in]
v_0018 := 0.75  # aggregate in [in]
v_0019 := 5.5  # fc ksi [ksi]
v_0020 := 60  # fy ksi [ksi]
v_0021 := 0.15  # density kcf [kip/ft³]
v_0022 := 1.25  # gamma dc [—]
v_0023 := 6  # first ring in [in]
v_0024 := 36  # ring spacing in [in]
v_0025 := 5  # ring count [—]
v_0026 := 5  # grid bar [—]
v_0027 := 6  # grid spacing in [in]
v_0028 := 0.5  # spacing increment in [in]
v_0029 := 12  # project max spacing in [in]
v_0030 := 72  # u leg in [in]
v_0031 := 60  # vertical lap in [in]
v_0032 := 20.125  # ring id in [in]
v_0033 := 23  # ring od in [in]
v_0034 := 0.5  # ring t in [in]
v_0035 := 50  # ring fy ksi [ksi]
v_0036 := 65  # ring fu ksi [ksi]
v_0037 := 0.3125  # weld leg in [in]
v_0038 := 70  # weld fexx ksi [ksi]
v_0039 := 0.7  # phi concrete [—]
v_0040 := 1  # phi plate [—]
v_0041 := 0.8  # phi weld [—]
v_0042 := 1  # phi shear yield [—]
v_0043 := 0.8  # phi shear rupture [—]
v_0044 := 3.14159265359  # pi value [—]
v_0045 := 0.625  # Selected diameter; regenerate native sheet after bar-size changes [in]
v_0046 := 0.31  # bar area [in²]
v_0047 := max(0.11, min(0.6, 1.3*v_0003*v_0002/(2*(v_0003 + v_0002)*v_0020)))  # steel L [in²/ft]
v_0048 := max(0.11, min(0.6, 1.3*v_0003*v_0004/(2*(v_0003 + v_0004)*v_0020)))  # steel H [in²/ft]
v_0049 := max(v_0047, v_0048)  # Both directions / each face; gross-section envelope [in²/ft]
v_0050 := min(1.5*v_0003, if(v_0003 > 36, 12, 18))  # Conservative wall/slab and thick-member spacing envelope [in]
v_0051 := min(v_0050, v_0029)  # pitch limit [in]
v_0052 := 11  # Adopted pitch; fixed input in distilled sheets [in]
v_0053 := 12*v_0046/v_0052  # steel provided [in²/ft]
v_0054 := max(1.5, 1.5*v_0045, 1.5*v_0018)  # clear required [in]
v_0055 := v_0052 - v_0045  # clear provided [in]
v_0056 := 1  # coating factor [—]
v_0057 := 0.17*v_0045*(v_0020/(1.97*v_0019^0.25))^2  # Normalweight; no confinement credit [in]
v_0058 := max(12, v_0057*min(1.7, 1.3*v_0056))  # Conservative top-cast factor [in]
v_0059 := max(12, v_0057*v_0056)  # ld vertical [in]
v_0060 := 1.3*v_0058  # lap horizontal [in]
v_0061 := 1.3*v_0059  # lap vertical [in]
v_0062 := if(v_0026 ≤ 8, 6, 8)*v_0045 + 2*v_0045  # bend envelope [in]
v_0063 := v_0003 - 2*v_0016  # u width [in]
v_0064 := v_0002 - 2*v_0016 - 2*v_0045  # u leg available [in]
v_0065 := v_0004 - 2*v_0016 - 2*v_0045  # vertical available [in]
v_0066 := v_0007/2  # pipe radius [in]
v_0067 := v_0032/2  # inner radius [in]
v_0068 := v_0033/2  # outer radius [in]
v_0069 := v_0067 - v_0066  # root gap [in]
v_0070 := max(v_0067, v_0066 + v_0037)  # Horizontal bearing excludes upper weld footprint [in]
v_0071 := v_0044*(v_0068^2 - v_0070^2)  # bearing area [in²]
v_0072 := v_0044*(v_0068^4 - v_0070^4)/4  # bearing inertia [in⁴]
v_0073 := v_0039*0.85*v_0019  # No supporting-area enhancement; m = 1 [ksi]
v_0074 := v_0040*v_0035*v_0034^2/6  # Elastic radial cantilever strip [kip-in/in]
v_0075 := v_0042*0.58*v_0035*v_0034  # plate shear capacity [kip/in]
v_0076 := (v_0037 - v_0069)/sqrt(2)  # Conservative fit-up allowance; WPS must permit gap [in]
v_0077 := v_0041*0.6*v_0038*v_0076  # One continuous fillet; no directional enhancement [kip/in]
v_0078 := max(v_0034, v_0008)  # thicker part [in]
v_0079 := if(v_0078 ≤ 0.75, 0.25, 0.3125)  # minimum thick weld [in]
v_0080 := if(v_0078 ≤ 0.5, 0.1875, v_0079)  # minimum mid weld [in]
v_0081 := if(v_0078 ≤ 0.25, 0.125, v_0080)  # minimum table weld [in]
v_0082 := min(v_0081, v_0034, v_0008)  # weld minimum [in]
v_0083 := v_0082 + v_0069  # weld min gap [in]
v_0084 := if(v_0034 < 0.25, v_0034, v_0034 - 0.0625)  # Ring edge limit; pipe is a face, not free edge [in]
v_0085 := 2*v_0044*v_0066  # Each of two continuous circumferential welds [in]
v_0086 := max(4*v_0037, 1.5)  # weld length min [in]
v_0087 := v_0043*0.58*v_0036*v_0034  # ring base capacity [kip/in]
v_0088 := v_0043*0.58*v_0010*v_0008  # pipe base capacity [kip/in]
v_0089 := v_0042*0.58*v_0009*v_0008  # pipe yield capacity [kip/in]
v_0090 := (v_0002 - (v_0005 - 1)*v_0006)/2  # end offset [in]
v_0091 := v_0090 - v_0068 - v_0011  # end clear [in]
v_0092 := v_0003/2 - v_0068 - v_0011  # face clear [in]
v_0093 := v_0003/2 - v_0016 - 2*v_0045 - v_0068 - v_0011  # grid gap [in]
v_0094 := max(1, 1.5*v_0018)  # ring grid required [in]
v_0095 := v_0023 - v_0034 - v_0037  # bottom ring cover [in]
v_0096 := v_0004 - v_0023 - (v_0025 - 1)*v_0024 - v_0037  # top ring cover [in]
v_0097 := v_0006 - v_0033 - 2*v_0011  # between rings [in]
v_0098 := v_0021*v_0003/1728  # Gross concrete prism; no pipe/plate displacement deduction [kip/in²]
v_0099 := v_0022*v_0098  # factored density [kip/in²]
v_0100 := v_0098*v_0002*v_0004  # total service [kip]
v_0101 := v_0022*v_0100  # total factored [kip]
v_0102 := v_0066 - v_0008  # Effective pipe wall [in]
v_0103 := v_0044*(v_0066^2 - v_0102^2)  # pipe area [in²]
v_0104 := v_0044*(v_0066^4 - v_0102^4)/4  # pipe inertia [in⁴]
v_0105 := v_0103*v_0012/v_0014  # Axial spring over the entered effective length [kip/in]
v_0106 := 4*v_0012*v_0104/v_0013  # Head translation restrained; bound of the fixed-base cantilever family [kip-in/rad]
v_0107 := v_0090 + (v_0005 - 1)*v_0006/2  # group centroid [in]
v_0108 := v_0006^2*v_0005*(v_0005^2 - 1)/12  # Equally spaced piles; zero for one pile [in²]
v_0109 := v_0101*v_0011/(v_0105*v_0108 + v_0005*v_0106)  # Pile group displaced by the tolerance relative to the wall centroid [rad]
v_0110 := v_0109 + v_0015  # Applied to every pile head [rad]
v_0111 := v_0106*v_0110  # Compatibility moment at one pile head [kip-in]
v_0112 := v_0111/v_0025  # Shared equally by the ring rows; no shaft-bearing credit [kip-in]
v_0113 := v_0072/(v_0071*v_0068)  # Equivalent eccentricity at which full contact is lost [in]
v_0114 := 0  # row 1 lo [in]
v_0115 := v_0023 + (1 - 0.5)*v_0024  # row 1 hi [in]
v_0116 := v_0115 - v_0114  # row 1 height [in]
v_0117 := v_0116/v_0004  # Row tributary fraction of the wall height [—]
v_0118 := v_0090 + (1 - 1)*v_0006  # ring 1 1 x [in]
v_0119 := 0  # ring 1 1 lo [in]
v_0120 := v_0090 + (1 - 0.5)*v_0006  # ring 1 1 hi [in]
v_0121 := v_0120 - v_0119  # ring 1 1 width [in]
v_0122 := v_0121*v_0116*v_0003/1728  # ring 1 1 volume [ft³]
v_0123 := v_0021*v_0122  # ring 1 1 service [kip]
v_0124 := v_0022*v_0123  # ring 1 1 force [kip]
v_0125 := (v_0119 + v_0120)/2 - v_0118  # Retained for whole-wall equilibrium; carried by the wall, not the ring [in]
v_0126 := v_0124*(|v_0125| + v_0011)  # Superseded tributary-eccentricity basis (D-070); comparison only [kip-in]
v_0127 := v_0117*v_0105*v_0110*|v_0118 - v_0107|  # Rigid-body axial redistribution; sign taken to increase the ring force [kip]
v_0128 := v_0124 + v_0127  # ring 1 1 design force [kip]
v_0129 := v_0112/v_0128  # Compare with the kern limit [in]
v_0130 := v_0128/v_0071  # ring 1 1 qavg [ksi]
v_0131 := v_0112*v_0068/v_0072  # ring 1 1 qmoment [ksi]
v_0132 := v_0130 + v_0131  # ring 1 1 qmax [ksi]
v_0133 := v_0130 - v_0131  # ring 1 1 qmin [ksi]
v_0134 := v_0132*((v_0068^3 - v_0070^3)/(3*v_0066) - (v_0068^2 - v_0070^2)/2)
# Peak pressure over full radial strip [kip-in/in]
v_0135 := v_0132*(v_0068^2 - v_0070^2)/(2*v_0066)  # ring 1 1 root shear [kip/in]
v_0136 := sqrt(6*v_0134/(v_0040*v_0035))  # ring 1 1 thickness bending [in]
v_0137 := v_0135/(v_0042*0.58*v_0035)  # ring 1 1 thickness shear [in]
v_0138 := max(v_0136, v_0137, v_0037 + 0.0625)  # Bending, shear and conservative weld-edge allowance; revise/recalculate after selecting thickness [in]
v_0139 := v_0134/v_0034  # Top/bottom weld couple separated conservatively by plate thickness [kip/in]
v_0140 := sqrt((v_0135/2)^2 + v_0139^2)  # Per fillet: half vertical shear + full radial couple force [kip/in]
v_0141 := v_0069 + sqrt(2)*v_0140/(v_0041*0.6*v_0038)  # ring 1 1 weld strength leg [in]
v_0142 := max(v_0141, v_0083)  # Strength and minimum detailing; revise/recalculate after selecting weld [in]
v_0143 := round(16*v_0142, 0)  # Nearest whole number of sixteenths [—]
v_0144 := if(v_0143 ≥ 16*v_0142, v_0143, v_0143 + 1)/16  # Trial leg rounded up to the next 1/16 in [in]
v_0145 := v_0090 + (2 - 1)*v_0006  # ring 1 2 x [in]
v_0146 := v_0090 + (2 - 1.5)*v_0006  # ring 1 2 lo [in]
v_0147 := v_0090 + (2 - 0.5)*v_0006  # ring 1 2 hi [in]
v_0148 := v_0147 - v_0146  # ring 1 2 width [in]
v_0149 := v_0148*v_0116*v_0003/1728  # ring 1 2 volume [ft³]
v_0150 := v_0021*v_0149  # ring 1 2 service [kip]
v_0151 := v_0022*v_0150  # ring 1 2 force [kip]
v_0152 := (v_0146 + v_0147)/2 - v_0145  # Retained for whole-wall equilibrium; carried by the wall, not the ring [in]
v_0153 := v_0151*(|v_0152| + v_0011)  # Superseded tributary-eccentricity basis (D-070); comparison only [kip-in]
v_0154 := v_0117*v_0105*v_0110*|v_0145 - v_0107|  # Rigid-body axial redistribution; sign taken to increase the ring force [kip]
v_0155 := v_0151 + v_0154  # ring 1 2 design force [kip]
v_0156 := v_0112/v_0155  # Compare with the kern limit [in]
v_0157 := v_0155/v_0071  # ring 1 2 qavg [ksi]
v_0158 := v_0112*v_0068/v_0072  # ring 1 2 qmoment [ksi]
v_0159 := v_0157 + v_0158  # ring 1 2 qmax [ksi]
v_0160 := v_0157 - v_0158  # ring 1 2 qmin [ksi]
v_0161 := v_0159*((v_0068^3 - v_0070^3)/(3*v_0066) - (v_0068^2 - v_0070^2)/2)
# Peak pressure over full radial strip [kip-in/in]
v_0162 := v_0159*(v_0068^2 - v_0070^2)/(2*v_0066)  # ring 1 2 root shear [kip/in]
v_0163 := sqrt(6*v_0161/(v_0040*v_0035))  # ring 1 2 thickness bending [in]
v_0164 := v_0162/(v_0042*0.58*v_0035)  # ring 1 2 thickness shear [in]
v_0165 := max(v_0163, v_0164, v_0037 + 0.0625)  # Bending, shear and conservative weld-edge allowance; revise/recalculate after selecting thickness [in]
v_0166 := v_0161/v_0034  # Top/bottom weld couple separated conservatively by plate thickness [kip/in]
v_0167 := sqrt((v_0162/2)^2 + v_0166^2)  # Per fillet: half vertical shear + full radial couple force [kip/in]
v_0168 := v_0069 + sqrt(2)*v_0167/(v_0041*0.6*v_0038)  # ring 1 2 weld strength leg [in]
v_0169 := max(v_0168, v_0083)  # Strength and minimum detailing; revise/recalculate after selecting weld [in]
v_0170 := round(16*v_0169, 0)  # Nearest whole number of sixteenths [—]
v_0171 := if(v_0170 ≥ 16*v_0169, v_0170, v_0170 + 1)/16  # Trial leg rounded up to the next 1/16 in [in]
v_0172 := v_0090 + (3 - 1)*v_0006  # ring 1 3 x [in]
v_0173 := v_0090 + (3 - 1.5)*v_0006  # ring 1 3 lo [in]
v_0174 := v_0090 + (3 - 0.5)*v_0006  # ring 1 3 hi [in]
v_0175 := v_0174 - v_0173  # ring 1 3 width [in]
v_0176 := v_0175*v_0116*v_0003/1728  # ring 1 3 volume [ft³]
v_0177 := v_0021*v_0176  # ring 1 3 service [kip]
v_0178 := v_0022*v_0177  # ring 1 3 force [kip]
v_0179 := (v_0173 + v_0174)/2 - v_0172  # Retained for whole-wall equilibrium; carried by the wall, not the ring [in]
v_0180 := v_0178*(|v_0179| + v_0011)  # Superseded tributary-eccentricity basis (D-070); comparison only [kip-in]
v_0181 := v_0117*v_0105*v_0110*|v_0172 - v_0107|  # Rigid-body axial redistribution; sign taken to increase the ring force [kip]
v_0182 := v_0178 + v_0181  # ring 1 3 design force [kip]
v_0183 := v_0112/v_0182  # Compare with the kern limit [in]
v_0184 := v_0182/v_0071  # ring 1 3 qavg [ksi]
v_0185 := v_0112*v_0068/v_0072  # ring 1 3 qmoment [ksi]
v_0186 := v_0184 + v_0185  # ring 1 3 qmax [ksi]
v_0187 := v_0184 - v_0185  # ring 1 3 qmin [ksi]
v_0188 := v_0186*((v_0068^3 - v_0070^3)/(3*v_0066) - (v_0068^2 - v_0070^2)/2)
# Peak pressure over full radial strip [kip-in/in]
v_0189 := v_0186*(v_0068^2 - v_0070^2)/(2*v_0066)  # ring 1 3 root shear [kip/in]
v_0190 := sqrt(6*v_0188/(v_0040*v_0035))  # ring 1 3 thickness bending [in]
v_0191 := v_0189/(v_0042*0.58*v_0035)  # ring 1 3 thickness shear [in]
v_0192 := max(v_0190, v_0191, v_0037 + 0.0625)  # Bending, shear and conservative weld-edge allowance; revise/recalculate after selecting thickness [in]
v_0193 := v_0188/v_0034  # Top/bottom weld couple separated conservatively by plate thickness [kip/in]
v_0194 := sqrt((v_0189/2)^2 + v_0193^2)  # Per fillet: half vertical shear + full radial couple force [kip/in]
v_0195 := v_0069 + sqrt(2)*v_0194/(v_0041*0.6*v_0038)  # ring 1 3 weld strength leg [in]
v_0196 := max(v_0195, v_0083)  # Strength and minimum detailing; revise/recalculate after selecting weld [in]
v_0197 := round(16*v_0196, 0)  # Nearest whole number of sixteenths [—]
v_0198 := if(v_0197 ≥ 16*v_0196, v_0197, v_0197 + 1)/16  # Trial leg rounded up to the next 1/16 in [in]
v_0199 := v_0090 + (4 - 1)*v_0006  # ring 1 4 x [in]
v_0200 := v_0090 + (4 - 1.5)*v_0006  # ring 1 4 lo [in]
v_0201 := v_0002  # ring 1 4 hi [in]
v_0202 := v_0201 - v_0200  # ring 1 4 width [in]
v_0203 := v_0202*v_0116*v_0003/1728  # ring 1 4 volume [ft³]
v_0204 := v_0021*v_0203  # ring 1 4 service [kip]
v_0205 := v_0022*v_0204  # ring 1 4 force [kip]
v_0206 := (v_0200 + v_0201)/2 - v_0199  # Retained for whole-wall equilibrium; carried by the wall, not the ring [in]
v_0207 := v_0205*(|v_0206| + v_0011)  # Superseded tributary-eccentricity basis (D-070); comparison only [kip-in]
v_0208 := v_0117*v_0105*v_0110*|v_0199 - v_0107|  # Rigid-body axial redistribution; sign taken to increase the ring force [kip]
v_0209 := v_0205 + v_0208  # ring 1 4 design force [kip]
v_0210 := v_0112/v_0209  # Compare with the kern limit [in]
v_0211 := v_0209/v_0071  # ring 1 4 qavg [ksi]
v_0212 := v_0112*v_0068/v_0072  # ring 1 4 qmoment [ksi]
v_0213 := v_0211 + v_0212  # ring 1 4 qmax [ksi]
v_0214 := v_0211 - v_0212  # ring 1 4 qmin [ksi]
v_0215 := v_0213*((v_0068^3 - v_0070^3)/(3*v_0066) - (v_0068^2 - v_0070^2)/2)
# Peak pressure over full radial strip [kip-in/in]
v_0216 := v_0213*(v_0068^2 - v_0070^2)/(2*v_0066)  # ring 1 4 root shear [kip/in]
v_0217 := sqrt(6*v_0215/(v_0040*v_0035))  # ring 1 4 thickness bending [in]
v_0218 := v_0216/(v_0042*0.58*v_0035)  # ring 1 4 thickness shear [in]
v_0219 := max(v_0217, v_0218, v_0037 + 0.0625)  # Bending, shear and conservative weld-edge allowance; revise/recalculate after selecting thickness [in]
v_0220 := v_0215/v_0034  # Top/bottom weld couple separated conservatively by plate thickness [kip/in]
v_0221 := sqrt((v_0216/2)^2 + v_0220^2)  # Per fillet: half vertical shear + full radial couple force [kip/in]
v_0222 := v_0069 + sqrt(2)*v_0221/(v_0041*0.6*v_0038)  # ring 1 4 weld strength leg [in]
v_0223 := max(v_0222, v_0083)  # Strength and minimum detailing; revise/recalculate after selecting weld [in]
v_0224 := round(16*v_0223, 0)  # Nearest whole number of sixteenths [—]
v_0225 := if(v_0224 ≥ 16*v_0223, v_0224, v_0224 + 1)/16  # Trial leg rounded up to the next 1/16 in [in]
v_0226 := v_0023 + (2 - 1.5)*v_0024  # row 2 lo [in]
v_0227 := v_0023 + (2 - 0.5)*v_0024  # row 2 hi [in]
v_0228 := v_0227 - v_0226  # row 2 height [in]
v_0229 := v_0228/v_0004  # Row tributary fraction of the wall height [—]
v_0230 := v_0090 + (1 - 1)*v_0006  # ring 2 1 x [in]
v_0231 := 0  # ring 2 1 lo [in]
v_0232 := v_0090 + (1 - 0.5)*v_0006  # ring 2 1 hi [in]
v_0233 := v_0232 - v_0231  # ring 2 1 width [in]
v_0234 := v_0233*v_0228*v_0003/1728  # ring 2 1 volume [ft³]
v_0235 := v_0021*v_0234  # ring 2 1 service [kip]
v_0236 := v_0022*v_0235  # ring 2 1 force [kip]
v_0237 := (v_0231 + v_0232)/2 - v_0230  # Retained for whole-wall equilibrium; carried by the wall, not the ring [in]
v_0238 := v_0236*(|v_0237| + v_0011)  # Superseded tributary-eccentricity basis (D-070); comparison only [kip-in]
v_0239 := v_0229*v_0105*v_0110*|v_0230 - v_0107|  # Rigid-body axial redistribution; sign taken to increase the ring force [kip]
v_0240 := v_0236 + v_0239  # ring 2 1 design force [kip]
v_0241 := v_0112/v_0240  # Compare with the kern limit [in]
v_0242 := v_0240/v_0071  # ring 2 1 qavg [ksi]
v_0243 := v_0112*v_0068/v_0072  # ring 2 1 qmoment [ksi]
v_0244 := v_0242 + v_0243  # ring 2 1 qmax [ksi]
v_0245 := v_0242 - v_0243  # ring 2 1 qmin [ksi]
v_0246 := v_0244*((v_0068^3 - v_0070^3)/(3*v_0066) - (v_0068^2 - v_0070^2)/2)
# Peak pressure over full radial strip [kip-in/in]
v_0247 := v_0244*(v_0068^2 - v_0070^2)/(2*v_0066)  # ring 2 1 root shear [kip/in]
v_0248 := sqrt(6*v_0246/(v_0040*v_0035))  # ring 2 1 thickness bending [in]
v_0249 := v_0247/(v_0042*0.58*v_0035)  # ring 2 1 thickness shear [in]
v_0250 := max(v_0248, v_0249, v_0037 + 0.0625)  # Bending, shear and conservative weld-edge allowance; revise/recalculate after selecting thickness [in]
v_0251 := v_0246/v_0034  # Top/bottom weld couple separated conservatively by plate thickness [kip/in]
v_0252 := sqrt((v_0247/2)^2 + v_0251^2)  # Per fillet: half vertical shear + full radial couple force [kip/in]
v_0253 := v_0069 + sqrt(2)*v_0252/(v_0041*0.6*v_0038)  # ring 2 1 weld strength leg [in]
v_0254 := max(v_0253, v_0083)  # Strength and minimum detailing; revise/recalculate after selecting weld [in]
v_0255 := round(16*v_0254, 0)  # Nearest whole number of sixteenths [—]
v_0256 := if(v_0255 ≥ 16*v_0254, v_0255, v_0255 + 1)/16  # Trial leg rounded up to the next 1/16 in [in]
v_0257 := v_0090 + (2 - 1)*v_0006  # ring 2 2 x [in]
v_0258 := v_0090 + (2 - 1.5)*v_0006  # ring 2 2 lo [in]
v_0259 := v_0090 + (2 - 0.5)*v_0006  # ring 2 2 hi [in]
v_0260 := v_0259 - v_0258  # ring 2 2 width [in]
v_0261 := v_0260*v_0228*v_0003/1728  # ring 2 2 volume [ft³]
v_0262 := v_0021*v_0261  # ring 2 2 service [kip]
v_0263 := v_0022*v_0262  # ring 2 2 force [kip]
v_0264 := (v_0258 + v_0259)/2 - v_0257  # Retained for whole-wall equilibrium; carried by the wall, not the ring [in]
v_0265 := v_0263*(|v_0264| + v_0011)  # Superseded tributary-eccentricity basis (D-070); comparison only [kip-in]
v_0266 := v_0229*v_0105*v_0110*|v_0257 - v_0107|  # Rigid-body axial redistribution; sign taken to increase the ring force [kip]
v_0267 := v_0263 + v_0266  # ring 2 2 design force [kip]
v_0268 := v_0112/v_0267  # Compare with the kern limit [in]
v_0269 := v_0267/v_0071  # ring 2 2 qavg [ksi]
v_0270 := v_0112*v_0068/v_0072  # ring 2 2 qmoment [ksi]
v_0271 := v_0269 + v_0270  # ring 2 2 qmax [ksi]
v_0272 := v_0269 - v_0270  # ring 2 2 qmin [ksi]
v_0273 := v_0271*((v_0068^3 - v_0070^3)/(3*v_0066) - (v_0068^2 - v_0070^2)/2)
# Peak pressure over full radial strip [kip-in/in]
v_0274 := v_0271*(v_0068^2 - v_0070^2)/(2*v_0066)  # ring 2 2 root shear [kip/in]
v_0275 := sqrt(6*v_0273/(v_0040*v_0035))  # ring 2 2 thickness bending [in]
v_0276 := v_0274/(v_0042*0.58*v_0035)  # ring 2 2 thickness shear [in]
v_0277 := max(v_0275, v_0276, v_0037 + 0.0625)  # Bending, shear and conservative weld-edge allowance; revise/recalculate after selecting thickness [in]
v_0278 := v_0273/v_0034  # Top/bottom weld couple separated conservatively by plate thickness [kip/in]
v_0279 := sqrt((v_0274/2)^2 + v_0278^2)  # Per fillet: half vertical shear + full radial couple force [kip/in]
v_0280 := v_0069 + sqrt(2)*v_0279/(v_0041*0.6*v_0038)  # ring 2 2 weld strength leg [in]
v_0281 := max(v_0280, v_0083)  # Strength and minimum detailing; revise/recalculate after selecting weld [in]
v_0282 := round(16*v_0281, 0)  # Nearest whole number of sixteenths [—]
v_0283 := if(v_0282 ≥ 16*v_0281, v_0282, v_0282 + 1)/16  # Trial leg rounded up to the next 1/16 in [in]
v_0284 := v_0090 + (3 - 1)*v_0006  # ring 2 3 x [in]
v_0285 := v_0090 + (3 - 1.5)*v_0006  # ring 2 3 lo [in]
v_0286 := v_0090 + (3 - 0.5)*v_0006  # ring 2 3 hi [in]
v_0287 := v_0286 - v_0285  # ring 2 3 width [in]
v_0288 := v_0287*v_0228*v_0003/1728  # ring 2 3 volume [ft³]
v_0289 := v_0021*v_0288  # ring 2 3 service [kip]
v_0290 := v_0022*v_0289  # ring 2 3 force [kip]
v_0291 := (v_0285 + v_0286)/2 - v_0284  # Retained for whole-wall equilibrium; carried by the wall, not the ring [in]
v_0292 := v_0290*(|v_0291| + v_0011)  # Superseded tributary-eccentricity basis (D-070); comparison only [kip-in]
v_0293 := v_0229*v_0105*v_0110*|v_0284 - v_0107|  # Rigid-body axial redistribution; sign taken to increase the ring force [kip]
v_0294 := v_0290 + v_0293  # ring 2 3 design force [kip]
v_0295 := v_0112/v_0294  # Compare with the kern limit [in]
v_0296 := v_0294/v_0071  # ring 2 3 qavg [ksi]
v_0297 := v_0112*v_0068/v_0072  # ring 2 3 qmoment [ksi]
v_0298 := v_0296 + v_0297  # ring 2 3 qmax [ksi]
v_0299 := v_0296 - v_0297  # ring 2 3 qmin [ksi]
v_0300 := v_0298*((v_0068^3 - v_0070^3)/(3*v_0066) - (v_0068^2 - v_0070^2)/2)
# Peak pressure over full radial strip [kip-in/in]
v_0301 := v_0298*(v_0068^2 - v_0070^2)/(2*v_0066)  # ring 2 3 root shear [kip/in]
v_0302 := sqrt(6*v_0300/(v_0040*v_0035))  # ring 2 3 thickness bending [in]
v_0303 := v_0301/(v_0042*0.58*v_0035)  # ring 2 3 thickness shear [in]
v_0304 := max(v_0302, v_0303, v_0037 + 0.0625)  # Bending, shear and conservative weld-edge allowance; revise/recalculate after selecting thickness [in]
v_0305 := v_0300/v_0034  # Top/bottom weld couple separated conservatively by plate thickness [kip/in]
v_0306 := sqrt((v_0301/2)^2 + v_0305^2)  # Per fillet: half vertical shear + full radial couple force [kip/in]
v_0307 := v_0069 + sqrt(2)*v_0306/(v_0041*0.6*v_0038)  # ring 2 3 weld strength leg [in]
v_0308 := max(v_0307, v_0083)  # Strength and minimum detailing; revise/recalculate after selecting weld [in]
v_0309 := round(16*v_0308, 0)  # Nearest whole number of sixteenths [—]
v_0310 := if(v_0309 ≥ 16*v_0308, v_0309, v_0309 + 1)/16  # Trial leg rounded up to the next 1/16 in [in]
v_0311 := v_0090 + (4 - 1)*v_0006  # ring 2 4 x [in]
v_0312 := v_0090 + (4 - 1.5)*v_0006  # ring 2 4 lo [in]
v_0313 := v_0002  # ring 2 4 hi [in]
v_0314 := v_0313 - v_0312  # ring 2 4 width [in]
v_0315 := v_0314*v_0228*v_0003/1728  # ring 2 4 volume [ft³]
v_0316 := v_0021*v_0315  # ring 2 4 service [kip]
v_0317 := v_0022*v_0316  # ring 2 4 force [kip]
v_0318 := (v_0312 + v_0313)/2 - v_0311  # Retained for whole-wall equilibrium; carried by the wall, not the ring [in]
v_0319 := v_0317*(|v_0318| + v_0011)  # Superseded tributary-eccentricity basis (D-070); comparison only [kip-in]
v_0320 := v_0229*v_0105*v_0110*|v_0311 - v_0107|  # Rigid-body axial redistribution; sign taken to increase the ring force [kip]
v_0321 := v_0317 + v_0320  # ring 2 4 design force [kip]
v_0322 := v_0112/v_0321  # Compare with the kern limit [in]
v_0323 := v_0321/v_0071  # ring 2 4 qavg [ksi]
v_0324 := v_0112*v_0068/v_0072  # ring 2 4 qmoment [ksi]
v_0325 := v_0323 + v_0324  # ring 2 4 qmax [ksi]
v_0326 := v_0323 - v_0324  # ring 2 4 qmin [ksi]
v_0327 := v_0325*((v_0068^3 - v_0070^3)/(3*v_0066) - (v_0068^2 - v_0070^2)/2)
# Peak pressure over full radial strip [kip-in/in]
v_0328 := v_0325*(v_0068^2 - v_0070^2)/(2*v_0066)  # ring 2 4 root shear [kip/in]
v_0329 := sqrt(6*v_0327/(v_0040*v_0035))  # ring 2 4 thickness bending [in]
v_0330 := v_0328/(v_0042*0.58*v_0035)  # ring 2 4 thickness shear [in]
v_0331 := max(v_0329, v_0330, v_0037 + 0.0625)  # Bending, shear and conservative weld-edge allowance; revise/recalculate after selecting thickness [in]
v_0332 := v_0327/v_0034  # Top/bottom weld couple separated conservatively by plate thickness [kip/in]
v_0333 := sqrt((v_0328/2)^2 + v_0332^2)  # Per fillet: half vertical shear + full radial couple force [kip/in]
v_0334 := v_0069 + sqrt(2)*v_0333/(v_0041*0.6*v_0038)  # ring 2 4 weld strength leg [in]
v_0335 := max(v_0334, v_0083)  # Strength and minimum detailing; revise/recalculate after selecting weld [in]
v_0336 := round(16*v_0335, 0)  # Nearest whole number of sixteenths [—]
v_0337 := if(v_0336 ≥ 16*v_0335, v_0336, v_0336 + 1)/16  # Trial leg rounded up to the next 1/16 in [in]
v_0338 := v_0023 + (3 - 1.5)*v_0024  # row 3 lo [in]
v_0339 := v_0023 + (3 - 0.5)*v_0024  # row 3 hi [in]
v_0340 := v_0339 - v_0338  # row 3 height [in]
v_0341 := v_0340/v_0004  # Row tributary fraction of the wall height [—]
v_0342 := v_0090 + (1 - 1)*v_0006  # ring 3 1 x [in]
v_0343 := 0  # ring 3 1 lo [in]
v_0344 := v_0090 + (1 - 0.5)*v_0006  # ring 3 1 hi [in]
v_0345 := v_0344 - v_0343  # ring 3 1 width [in]
v_0346 := v_0345*v_0340*v_0003/1728  # ring 3 1 volume [ft³]
v_0347 := v_0021*v_0346  # ring 3 1 service [kip]
v_0348 := v_0022*v_0347  # ring 3 1 force [kip]
v_0349 := (v_0343 + v_0344)/2 - v_0342  # Retained for whole-wall equilibrium; carried by the wall, not the ring [in]
v_0350 := v_0348*(|v_0349| + v_0011)  # Superseded tributary-eccentricity basis (D-070); comparison only [kip-in]
v_0351 := v_0341*v_0105*v_0110*|v_0342 - v_0107|  # Rigid-body axial redistribution; sign taken to increase the ring force [kip]
v_0352 := v_0348 + v_0351  # ring 3 1 design force [kip]
v_0353 := v_0112/v_0352  # Compare with the kern limit [in]
v_0354 := v_0352/v_0071  # ring 3 1 qavg [ksi]
v_0355 := v_0112*v_0068/v_0072  # ring 3 1 qmoment [ksi]
v_0356 := v_0354 + v_0355  # ring 3 1 qmax [ksi]
v_0357 := v_0354 - v_0355  # ring 3 1 qmin [ksi]
v_0358 := v_0356*((v_0068^3 - v_0070^3)/(3*v_0066) - (v_0068^2 - v_0070^2)/2)
# Peak pressure over full radial strip [kip-in/in]
v_0359 := v_0356*(v_0068^2 - v_0070^2)/(2*v_0066)  # ring 3 1 root shear [kip/in]
v_0360 := sqrt(6*v_0358/(v_0040*v_0035))  # ring 3 1 thickness bending [in]
v_0361 := v_0359/(v_0042*0.58*v_0035)  # ring 3 1 thickness shear [in]
v_0362 := max(v_0360, v_0361, v_0037 + 0.0625)  # Bending, shear and conservative weld-edge allowance; revise/recalculate after selecting thickness [in]
v_0363 := v_0358/v_0034  # Top/bottom weld couple separated conservatively by plate thickness [kip/in]
v_0364 := sqrt((v_0359/2)^2 + v_0363^2)  # Per fillet: half vertical shear + full radial couple force [kip/in]
v_0365 := v_0069 + sqrt(2)*v_0364/(v_0041*0.6*v_0038)  # ring 3 1 weld strength leg [in]
v_0366 := max(v_0365, v_0083)  # Strength and minimum detailing; revise/recalculate after selecting weld [in]
v_0367 := round(16*v_0366, 0)  # Nearest whole number of sixteenths [—]
v_0368 := if(v_0367 ≥ 16*v_0366, v_0367, v_0367 + 1)/16  # Trial leg rounded up to the next 1/16 in [in]
v_0369 := v_0090 + (2 - 1)*v_0006  # ring 3 2 x [in]
v_0370 := v_0090 + (2 - 1.5)*v_0006  # ring 3 2 lo [in]
v_0371 := v_0090 + (2 - 0.5)*v_0006  # ring 3 2 hi [in]
v_0372 := v_0371 - v_0370  # ring 3 2 width [in]
v_0373 := v_0372*v_0340*v_0003/1728  # ring 3 2 volume [ft³]
v_0374 := v_0021*v_0373  # ring 3 2 service [kip]
v_0375 := v_0022*v_0374  # ring 3 2 force [kip]
v_0376 := (v_0370 + v_0371)/2 - v_0369  # Retained for whole-wall equilibrium; carried by the wall, not the ring [in]
v_0377 := v_0375*(|v_0376| + v_0011)  # Superseded tributary-eccentricity basis (D-070); comparison only [kip-in]
v_0378 := v_0341*v_0105*v_0110*|v_0369 - v_0107|  # Rigid-body axial redistribution; sign taken to increase the ring force [kip]
v_0379 := v_0375 + v_0378  # ring 3 2 design force [kip]
v_0380 := v_0112/v_0379  # Compare with the kern limit [in]
v_0381 := v_0379/v_0071  # ring 3 2 qavg [ksi]
v_0382 := v_0112*v_0068/v_0072  # ring 3 2 qmoment [ksi]
v_0383 := v_0381 + v_0382  # ring 3 2 qmax [ksi]
v_0384 := v_0381 - v_0382  # ring 3 2 qmin [ksi]
v_0385 := v_0383*((v_0068^3 - v_0070^3)/(3*v_0066) - (v_0068^2 - v_0070^2)/2)
# Peak pressure over full radial strip [kip-in/in]
v_0386 := v_0383*(v_0068^2 - v_0070^2)/(2*v_0066)  # ring 3 2 root shear [kip/in]
v_0387 := sqrt(6*v_0385/(v_0040*v_0035))  # ring 3 2 thickness bending [in]
v_0388 := v_0386/(v_0042*0.58*v_0035)  # ring 3 2 thickness shear [in]
v_0389 := max(v_0387, v_0388, v_0037 + 0.0625)  # Bending, shear and conservative weld-edge allowance; revise/recalculate after selecting thickness [in]
v_0390 := v_0385/v_0034  # Top/bottom weld couple separated conservatively by plate thickness [kip/in]
v_0391 := sqrt((v_0386/2)^2 + v_0390^2)  # Per fillet: half vertical shear + full radial couple force [kip/in]
v_0392 := v_0069 + sqrt(2)*v_0391/(v_0041*0.6*v_0038)  # ring 3 2 weld strength leg [in]
v_0393 := max(v_0392, v_0083)  # Strength and minimum detailing; revise/recalculate after selecting weld [in]
v_0394 := round(16*v_0393, 0)  # Nearest whole number of sixteenths [—]
v_0395 := if(v_0394 ≥ 16*v_0393, v_0394, v_0394 + 1)/16  # Trial leg rounded up to the next 1/16 in [in]
v_0396 := v_0090 + (3 - 1)*v_0006  # ring 3 3 x [in]
v_0397 := v_0090 + (3 - 1.5)*v_0006  # ring 3 3 lo [in]
v_0398 := v_0090 + (3 - 0.5)*v_0006  # ring 3 3 hi [in]
v_0399 := v_0398 - v_0397  # ring 3 3 width [in]
v_0400 := v_0399*v_0340*v_0003/1728  # ring 3 3 volume [ft³]
v_0401 := v_0021*v_0400  # ring 3 3 service [kip]
v_0402 := v_0022*v_0401  # ring 3 3 force [kip]
v_0403 := (v_0397 + v_0398)/2 - v_0396  # Retained for whole-wall equilibrium; carried by the wall, not the ring [in]
v_0404 := v_0402*(|v_0403| + v_0011)  # Superseded tributary-eccentricity basis (D-070); comparison only [kip-in]
v_0405 := v_0341*v_0105*v_0110*|v_0396 - v_0107|  # Rigid-body axial redistribution; sign taken to increase the ring force [kip]
v_0406 := v_0402 + v_0405  # ring 3 3 design force [kip]
v_0407 := v_0112/v_0406  # Compare with the kern limit [in]
v_0408 := v_0406/v_0071  # ring 3 3 qavg [ksi]
v_0409 := v_0112*v_0068/v_0072  # ring 3 3 qmoment [ksi]
v_0410 := v_0408 + v_0409  # ring 3 3 qmax [ksi]
v_0411 := v_0408 - v_0409  # ring 3 3 qmin [ksi]
v_0412 := v_0410*((v_0068^3 - v_0070^3)/(3*v_0066) - (v_0068^2 - v_0070^2)/2)
# Peak pressure over full radial strip [kip-in/in]
v_0413 := v_0410*(v_0068^2 - v_0070^2)/(2*v_0066)  # ring 3 3 root shear [kip/in]
v_0414 := sqrt(6*v_0412/(v_0040*v_0035))  # ring 3 3 thickness bending [in]
v_0415 := v_0413/(v_0042*0.58*v_0035)  # ring 3 3 thickness shear [in]
v_0416 := max(v_0414, v_0415, v_0037 + 0.0625)  # Bending, shear and conservative weld-edge allowance; revise/recalculate after selecting thickness [in]
v_0417 := v_0412/v_0034  # Top/bottom weld couple separated conservatively by plate thickness [kip/in]
v_0418 := sqrt((v_0413/2)^2 + v_0417^2)  # Per fillet: half vertical shear + full radial couple force [kip/in]
v_0419 := v_0069 + sqrt(2)*v_0418/(v_0041*0.6*v_0038)  # ring 3 3 weld strength leg [in]
v_0420 := max(v_0419, v_0083)  # Strength and minimum detailing; revise/recalculate after selecting weld [in]
v_0421 := round(16*v_0420, 0)  # Nearest whole number of sixteenths [—]
v_0422 := if(v_0421 ≥ 16*v_0420, v_0421, v_0421 + 1)/16  # Trial leg rounded up to the next 1/16 in [in]
v_0423 := v_0090 + (4 - 1)*v_0006  # ring 3 4 x [in]
v_0424 := v_0090 + (4 - 1.5)*v_0006  # ring 3 4 lo [in]
v_0425 := v_0002  # ring 3 4 hi [in]
v_0426 := v_0425 - v_0424  # ring 3 4 width [in]
v_0427 := v_0426*v_0340*v_0003/1728  # ring 3 4 volume [ft³]
v_0428 := v_0021*v_0427  # ring 3 4 service [kip]
v_0429 := v_0022*v_0428  # ring 3 4 force [kip]
v_0430 := (v_0424 + v_0425)/2 - v_0423  # Retained for whole-wall equilibrium; carried by the wall, not the ring [in]
v_0431 := v_0429*(|v_0430| + v_0011)  # Superseded tributary-eccentricity basis (D-070); comparison only [kip-in]
v_0432 := v_0341*v_0105*v_0110*|v_0423 - v_0107|  # Rigid-body axial redistribution; sign taken to increase the ring force [kip]
v_0433 := v_0429 + v_0432  # ring 3 4 design force [kip]
v_0434 := v_0112/v_0433  # Compare with the kern limit [in]
v_0435 := v_0433/v_0071  # ring 3 4 qavg [ksi]
v_0436 := v_0112*v_0068/v_0072  # ring 3 4 qmoment [ksi]
v_0437 := v_0435 + v_0436  # ring 3 4 qmax [ksi]
v_0438 := v_0435 - v_0436  # ring 3 4 qmin [ksi]
v_0439 := v_0437*((v_0068^3 - v_0070^3)/(3*v_0066) - (v_0068^2 - v_0070^2)/2)
# Peak pressure over full radial strip [kip-in/in]
v_0440 := v_0437*(v_0068^2 - v_0070^2)/(2*v_0066)  # ring 3 4 root shear [kip/in]
v_0441 := sqrt(6*v_0439/(v_0040*v_0035))  # ring 3 4 thickness bending [in]
v_0442 := v_0440/(v_0042*0.58*v_0035)  # ring 3 4 thickness shear [in]
v_0443 := max(v_0441, v_0442, v_0037 + 0.0625)  # Bending, shear and conservative weld-edge allowance; revise/recalculate after selecting thickness [in]
v_0444 := v_0439/v_0034  # Top/bottom weld couple separated conservatively by plate thickness [kip/in]
v_0445 := sqrt((v_0440/2)^2 + v_0444^2)  # Per fillet: half vertical shear + full radial couple force [kip/in]
v_0446 := v_0069 + sqrt(2)*v_0445/(v_0041*0.6*v_0038)  # ring 3 4 weld strength leg [in]
v_0447 := max(v_0446, v_0083)  # Strength and minimum detailing; revise/recalculate after selecting weld [in]
v_0448 := round(16*v_0447, 0)  # Nearest whole number of sixteenths [—]
v_0449 := if(v_0448 ≥ 16*v_0447, v_0448, v_0448 + 1)/16  # Trial leg rounded up to the next 1/16 in [in]
v_0450 := v_0023 + (4 - 1.5)*v_0024  # row 4 lo [in]
v_0451 := v_0023 + (4 - 0.5)*v_0024  # row 4 hi [in]
v_0452 := v_0451 - v_0450  # row 4 height [in]
v_0453 := v_0452/v_0004  # Row tributary fraction of the wall height [—]
v_0454 := v_0090 + (1 - 1)*v_0006  # ring 4 1 x [in]
v_0455 := 0  # ring 4 1 lo [in]
v_0456 := v_0090 + (1 - 0.5)*v_0006  # ring 4 1 hi [in]
v_0457 := v_0456 - v_0455  # ring 4 1 width [in]
v_0458 := v_0457*v_0452*v_0003/1728  # ring 4 1 volume [ft³]
v_0459 := v_0021*v_0458  # ring 4 1 service [kip]
v_0460 := v_0022*v_0459  # ring 4 1 force [kip]
v_0461 := (v_0455 + v_0456)/2 - v_0454  # Retained for whole-wall equilibrium; carried by the wall, not the ring [in]
v_0462 := v_0460*(|v_0461| + v_0011)  # Superseded tributary-eccentricity basis (D-070); comparison only [kip-in]
v_0463 := v_0453*v_0105*v_0110*|v_0454 - v_0107|  # Rigid-body axial redistribution; sign taken to increase the ring force [kip]
v_0464 := v_0460 + v_0463  # ring 4 1 design force [kip]
v_0465 := v_0112/v_0464  # Compare with the kern limit [in]
v_0466 := v_0464/v_0071  # ring 4 1 qavg [ksi]
v_0467 := v_0112*v_0068/v_0072  # ring 4 1 qmoment [ksi]
v_0468 := v_0466 + v_0467  # ring 4 1 qmax [ksi]
v_0469 := v_0466 - v_0467  # ring 4 1 qmin [ksi]
v_0470 := v_0468*((v_0068^3 - v_0070^3)/(3*v_0066) - (v_0068^2 - v_0070^2)/2)
# Peak pressure over full radial strip [kip-in/in]
v_0471 := v_0468*(v_0068^2 - v_0070^2)/(2*v_0066)  # ring 4 1 root shear [kip/in]
v_0472 := sqrt(6*v_0470/(v_0040*v_0035))  # ring 4 1 thickness bending [in]
v_0473 := v_0471/(v_0042*0.58*v_0035)  # ring 4 1 thickness shear [in]
v_0474 := max(v_0472, v_0473, v_0037 + 0.0625)  # Bending, shear and conservative weld-edge allowance; revise/recalculate after selecting thickness [in]
v_0475 := v_0470/v_0034  # Top/bottom weld couple separated conservatively by plate thickness [kip/in]
v_0476 := sqrt((v_0471/2)^2 + v_0475^2)  # Per fillet: half vertical shear + full radial couple force [kip/in]
v_0477 := v_0069 + sqrt(2)*v_0476/(v_0041*0.6*v_0038)  # ring 4 1 weld strength leg [in]
v_0478 := max(v_0477, v_0083)  # Strength and minimum detailing; revise/recalculate after selecting weld [in]
v_0479 := round(16*v_0478, 0)  # Nearest whole number of sixteenths [—]
v_0480 := if(v_0479 ≥ 16*v_0478, v_0479, v_0479 + 1)/16  # Trial leg rounded up to the next 1/16 in [in]
v_0481 := v_0090 + (2 - 1)*v_0006  # ring 4 2 x [in]
v_0482 := v_0090 + (2 - 1.5)*v_0006  # ring 4 2 lo [in]
v_0483 := v_0090 + (2 - 0.5)*v_0006  # ring 4 2 hi [in]
v_0484 := v_0483 - v_0482  # ring 4 2 width [in]
v_0485 := v_0484*v_0452*v_0003/1728  # ring 4 2 volume [ft³]
v_0486 := v_0021*v_0485  # ring 4 2 service [kip]
v_0487 := v_0022*v_0486  # ring 4 2 force [kip]
v_0488 := (v_0482 + v_0483)/2 - v_0481  # Retained for whole-wall equilibrium; carried by the wall, not the ring [in]
v_0489 := v_0487*(|v_0488| + v_0011)  # Superseded tributary-eccentricity basis (D-070); comparison only [kip-in]
v_0490 := v_0453*v_0105*v_0110*|v_0481 - v_0107|  # Rigid-body axial redistribution; sign taken to increase the ring force [kip]
v_0491 := v_0487 + v_0490  # ring 4 2 design force [kip]
v_0492 := v_0112/v_0491  # Compare with the kern limit [in]
v_0493 := v_0491/v_0071  # ring 4 2 qavg [ksi]
v_0494 := v_0112*v_0068/v_0072  # ring 4 2 qmoment [ksi]
v_0495 := v_0493 + v_0494  # ring 4 2 qmax [ksi]
v_0496 := v_0493 - v_0494  # ring 4 2 qmin [ksi]
v_0497 := v_0495*((v_0068^3 - v_0070^3)/(3*v_0066) - (v_0068^2 - v_0070^2)/2)
# Peak pressure over full radial strip [kip-in/in]
v_0498 := v_0495*(v_0068^2 - v_0070^2)/(2*v_0066)  # ring 4 2 root shear [kip/in]
v_0499 := sqrt(6*v_0497/(v_0040*v_0035))  # ring 4 2 thickness bending [in]
v_0500 := v_0498/(v_0042*0.58*v_0035)  # ring 4 2 thickness shear [in]
v_0501 := max(v_0499, v_0500, v_0037 + 0.0625)  # Bending, shear and conservative weld-edge allowance; revise/recalculate after selecting thickness [in]
v_0502 := v_0497/v_0034  # Top/bottom weld couple separated conservatively by plate thickness [kip/in]
v_0503 := sqrt((v_0498/2)^2 + v_0502^2)  # Per fillet: half vertical shear + full radial couple force [kip/in]
v_0504 := v_0069 + sqrt(2)*v_0503/(v_0041*0.6*v_0038)  # ring 4 2 weld strength leg [in]
v_0505 := max(v_0504, v_0083)  # Strength and minimum detailing; revise/recalculate after selecting weld [in]
v_0506 := round(16*v_0505, 0)  # Nearest whole number of sixteenths [—]
v_0507 := if(v_0506 ≥ 16*v_0505, v_0506, v_0506 + 1)/16  # Trial leg rounded up to the next 1/16 in [in]
v_0508 := v_0090 + (3 - 1)*v_0006  # ring 4 3 x [in]
v_0509 := v_0090 + (3 - 1.5)*v_0006  # ring 4 3 lo [in]
v_0510 := v_0090 + (3 - 0.5)*v_0006  # ring 4 3 hi [in]
v_0511 := v_0510 - v_0509  # ring 4 3 width [in]
v_0512 := v_0511*v_0452*v_0003/1728  # ring 4 3 volume [ft³]
v_0513 := v_0021*v_0512  # ring 4 3 service [kip]
v_0514 := v_0022*v_0513  # ring 4 3 force [kip]
v_0515 := (v_0509 + v_0510)/2 - v_0508  # Retained for whole-wall equilibrium; carried by the wall, not the ring [in]
v_0516 := v_0514*(|v_0515| + v_0011)  # Superseded tributary-eccentricity basis (D-070); comparison only [kip-in]
v_0517 := v_0453*v_0105*v_0110*|v_0508 - v_0107|  # Rigid-body axial redistribution; sign taken to increase the ring force [kip]
v_0518 := v_0514 + v_0517  # ring 4 3 design force [kip]
v_0519 := v_0112/v_0518  # Compare with the kern limit [in]
v_0520 := v_0518/v_0071  # ring 4 3 qavg [ksi]
v_0521 := v_0112*v_0068/v_0072  # ring 4 3 qmoment [ksi]
v_0522 := v_0520 + v_0521  # ring 4 3 qmax [ksi]
v_0523 := v_0520 - v_0521  # ring 4 3 qmin [ksi]
v_0524 := v_0522*((v_0068^3 - v_0070^3)/(3*v_0066) - (v_0068^2 - v_0070^2)/2)
# Peak pressure over full radial strip [kip-in/in]
v_0525 := v_0522*(v_0068^2 - v_0070^2)/(2*v_0066)  # ring 4 3 root shear [kip/in]
v_0526 := sqrt(6*v_0524/(v_0040*v_0035))  # ring 4 3 thickness bending [in]
v_0527 := v_0525/(v_0042*0.58*v_0035)  # ring 4 3 thickness shear [in]
v_0528 := max(v_0526, v_0527, v_0037 + 0.0625)  # Bending, shear and conservative weld-edge allowance; revise/recalculate after selecting thickness [in]
v_0529 := v_0524/v_0034  # Top/bottom weld couple separated conservatively by plate thickness [kip/in]
v_0530 := sqrt((v_0525/2)^2 + v_0529^2)  # Per fillet: half vertical shear + full radial couple force [kip/in]
v_0531 := v_0069 + sqrt(2)*v_0530/(v_0041*0.6*v_0038)  # ring 4 3 weld strength leg [in]
v_0532 := max(v_0531, v_0083)  # Strength and minimum detailing; revise/recalculate after selecting weld [in]
v_0533 := round(16*v_0532, 0)  # Nearest whole number of sixteenths [—]
v_0534 := if(v_0533 ≥ 16*v_0532, v_0533, v_0533 + 1)/16  # Trial leg rounded up to the next 1/16 in [in]
v_0535 := v_0090 + (4 - 1)*v_0006  # ring 4 4 x [in]
v_0536 := v_0090 + (4 - 1.5)*v_0006  # ring 4 4 lo [in]
v_0537 := v_0002  # ring 4 4 hi [in]
v_0538 := v_0537 - v_0536  # ring 4 4 width [in]
v_0539 := v_0538*v_0452*v_0003/1728  # ring 4 4 volume [ft³]
v_0540 := v_0021*v_0539  # ring 4 4 service [kip]
v_0541 := v_0022*v_0540  # ring 4 4 force [kip]
v_0542 := (v_0536 + v_0537)/2 - v_0535  # Retained for whole-wall equilibrium; carried by the wall, not the ring [in]
v_0543 := v_0541*(|v_0542| + v_0011)  # Superseded tributary-eccentricity basis (D-070); comparison only [kip-in]
v_0544 := v_0453*v_0105*v_0110*|v_0535 - v_0107|  # Rigid-body axial redistribution; sign taken to increase the ring force [kip]
v_0545 := v_0541 + v_0544  # ring 4 4 design force [kip]
v_0546 := v_0112/v_0545  # Compare with the kern limit [in]
v_0547 := v_0545/v_0071  # ring 4 4 qavg [ksi]
v_0548 := v_0112*v_0068/v_0072  # ring 4 4 qmoment [ksi]
v_0549 := v_0547 + v_0548  # ring 4 4 qmax [ksi]
v_0550 := v_0547 - v_0548  # ring 4 4 qmin [ksi]
v_0551 := v_0549*((v_0068^3 - v_0070^3)/(3*v_0066) - (v_0068^2 - v_0070^2)/2)
# Peak pressure over full radial strip [kip-in/in]
v_0552 := v_0549*(v_0068^2 - v_0070^2)/(2*v_0066)  # ring 4 4 root shear [kip/in]
v_0553 := sqrt(6*v_0551/(v_0040*v_0035))  # ring 4 4 thickness bending [in]
v_0554 := v_0552/(v_0042*0.58*v_0035)  # ring 4 4 thickness shear [in]
v_0555 := max(v_0553, v_0554, v_0037 + 0.0625)  # Bending, shear and conservative weld-edge allowance; revise/recalculate after selecting thickness [in]
v_0556 := v_0551/v_0034  # Top/bottom weld couple separated conservatively by plate thickness [kip/in]
v_0557 := sqrt((v_0552/2)^2 + v_0556^2)  # Per fillet: half vertical shear + full radial couple force [kip/in]
v_0558 := v_0069 + sqrt(2)*v_0557/(v_0041*0.6*v_0038)  # ring 4 4 weld strength leg [in]
v_0559 := max(v_0558, v_0083)  # Strength and minimum detailing; revise/recalculate after selecting weld [in]
v_0560 := round(16*v_0559, 0)  # Nearest whole number of sixteenths [—]
v_0561 := if(v_0560 ≥ 16*v_0559, v_0560, v_0560 + 1)/16  # Trial leg rounded up to the next 1/16 in [in]
v_0562 := v_0023 + (5 - 1.5)*v_0024  # row 5 lo [in]
v_0563 := v_0004  # row 5 hi [in]
v_0564 := v_0563 - v_0562  # row 5 height [in]
v_0565 := v_0564/v_0004  # Row tributary fraction of the wall height [—]
v_0566 := v_0090 + (1 - 1)*v_0006  # ring 5 1 x [in]
v_0567 := 0  # ring 5 1 lo [in]
v_0568 := v_0090 + (1 - 0.5)*v_0006  # ring 5 1 hi [in]
v_0569 := v_0568 - v_0567  # ring 5 1 width [in]
v_0570 := v_0569*v_0564*v_0003/1728  # ring 5 1 volume [ft³]
v_0571 := v_0021*v_0570  # ring 5 1 service [kip]
v_0572 := v_0022*v_0571  # ring 5 1 force [kip]
v_0573 := (v_0567 + v_0568)/2 - v_0566  # Retained for whole-wall equilibrium; carried by the wall, not the ring [in]
v_0574 := v_0572*(|v_0573| + v_0011)  # Superseded tributary-eccentricity basis (D-070); comparison only [kip-in]
v_0575 := v_0565*v_0105*v_0110*|v_0566 - v_0107|  # Rigid-body axial redistribution; sign taken to increase the ring force [kip]
v_0576 := v_0572 + v_0575  # ring 5 1 design force [kip]
v_0577 := v_0112/v_0576  # Compare with the kern limit [in]
v_0578 := v_0576/v_0071  # ring 5 1 qavg [ksi]
v_0579 := v_0112*v_0068/v_0072  # ring 5 1 qmoment [ksi]
v_0580 := v_0578 + v_0579  # ring 5 1 qmax [ksi]
v_0581 := v_0578 - v_0579  # ring 5 1 qmin [ksi]
v_0582 := v_0580*((v_0068^3 - v_0070^3)/(3*v_0066) - (v_0068^2 - v_0070^2)/2)
# Peak pressure over full radial strip [kip-in/in]
v_0583 := v_0580*(v_0068^2 - v_0070^2)/(2*v_0066)  # ring 5 1 root shear [kip/in]
v_0584 := sqrt(6*v_0582/(v_0040*v_0035))  # ring 5 1 thickness bending [in]
v_0585 := v_0583/(v_0042*0.58*v_0035)  # ring 5 1 thickness shear [in]
v_0586 := max(v_0584, v_0585, v_0037 + 0.0625)  # Bending, shear and conservative weld-edge allowance; revise/recalculate after selecting thickness [in]
v_0587 := v_0582/v_0034  # Top/bottom weld couple separated conservatively by plate thickness [kip/in]
v_0588 := sqrt((v_0583/2)^2 + v_0587^2)  # Per fillet: half vertical shear + full radial couple force [kip/in]
v_0589 := v_0069 + sqrt(2)*v_0588/(v_0041*0.6*v_0038)  # ring 5 1 weld strength leg [in]
v_0590 := max(v_0589, v_0083)  # Strength and minimum detailing; revise/recalculate after selecting weld [in]
v_0591 := round(16*v_0590, 0)  # Nearest whole number of sixteenths [—]
v_0592 := if(v_0591 ≥ 16*v_0590, v_0591, v_0591 + 1)/16  # Trial leg rounded up to the next 1/16 in [in]
v_0593 := v_0090 + (2 - 1)*v_0006  # ring 5 2 x [in]
v_0594 := v_0090 + (2 - 1.5)*v_0006  # ring 5 2 lo [in]
v_0595 := v_0090 + (2 - 0.5)*v_0006  # ring 5 2 hi [in]
v_0596 := v_0595 - v_0594  # ring 5 2 width [in]
v_0597 := v_0596*v_0564*v_0003/1728  # ring 5 2 volume [ft³]
v_0598 := v_0021*v_0597  # ring 5 2 service [kip]
v_0599 := v_0022*v_0598  # ring 5 2 force [kip]
v_0600 := (v_0594 + v_0595)/2 - v_0593  # Retained for whole-wall equilibrium; carried by the wall, not the ring [in]
v_0601 := v_0599*(|v_0600| + v_0011)  # Superseded tributary-eccentricity basis (D-070); comparison only [kip-in]
v_0602 := v_0565*v_0105*v_0110*|v_0593 - v_0107|  # Rigid-body axial redistribution; sign taken to increase the ring force [kip]
v_0603 := v_0599 + v_0602  # ring 5 2 design force [kip]
v_0604 := v_0112/v_0603  # Compare with the kern limit [in]
v_0605 := v_0603/v_0071  # ring 5 2 qavg [ksi]
v_0606 := v_0112*v_0068/v_0072  # ring 5 2 qmoment [ksi]
v_0607 := v_0605 + v_0606  # ring 5 2 qmax [ksi]
v_0608 := v_0605 - v_0606  # ring 5 2 qmin [ksi]
v_0609 := v_0607*((v_0068^3 - v_0070^3)/(3*v_0066) - (v_0068^2 - v_0070^2)/2)
# Peak pressure over full radial strip [kip-in/in]
v_0610 := v_0607*(v_0068^2 - v_0070^2)/(2*v_0066)  # ring 5 2 root shear [kip/in]
v_0611 := sqrt(6*v_0609/(v_0040*v_0035))  # ring 5 2 thickness bending [in]
v_0612 := v_0610/(v_0042*0.58*v_0035)  # ring 5 2 thickness shear [in]
v_0613 := max(v_0611, v_0612, v_0037 + 0.0625)  # Bending, shear and conservative weld-edge allowance; revise/recalculate after selecting thickness [in]
v_0614 := v_0609/v_0034  # Top/bottom weld couple separated conservatively by plate thickness [kip/in]
v_0615 := sqrt((v_0610/2)^2 + v_0614^2)  # Per fillet: half vertical shear + full radial couple force [kip/in]
v_0616 := v_0069 + sqrt(2)*v_0615/(v_0041*0.6*v_0038)  # ring 5 2 weld strength leg [in]
v_0617 := max(v_0616, v_0083)  # Strength and minimum detailing; revise/recalculate after selecting weld [in]
v_0618 := round(16*v_0617, 0)  # Nearest whole number of sixteenths [—]
v_0619 := if(v_0618 ≥ 16*v_0617, v_0618, v_0618 + 1)/16  # Trial leg rounded up to the next 1/16 in [in]
v_0620 := v_0090 + (3 - 1)*v_0006  # ring 5 3 x [in]
v_0621 := v_0090 + (3 - 1.5)*v_0006  # ring 5 3 lo [in]
v_0622 := v_0090 + (3 - 0.5)*v_0006  # ring 5 3 hi [in]
v_0623 := v_0622 - v_0621  # ring 5 3 width [in]
v_0624 := v_0623*v_0564*v_0003/1728  # ring 5 3 volume [ft³]
v_0625 := v_0021*v_0624  # ring 5 3 service [kip]
v_0626 := v_0022*v_0625  # ring 5 3 force [kip]
v_0627 := (v_0621 + v_0622)/2 - v_0620  # Retained for whole-wall equilibrium; carried by the wall, not the ring [in]
v_0628 := v_0626*(|v_0627| + v_0011)  # Superseded tributary-eccentricity basis (D-070); comparison only [kip-in]
v_0629 := v_0565*v_0105*v_0110*|v_0620 - v_0107|  # Rigid-body axial redistribution; sign taken to increase the ring force [kip]
v_0630 := v_0626 + v_0629  # ring 5 3 design force [kip]
v_0631 := v_0112/v_0630  # Compare with the kern limit [in]
v_0632 := v_0630/v_0071  # ring 5 3 qavg [ksi]
v_0633 := v_0112*v_0068/v_0072  # ring 5 3 qmoment [ksi]
v_0634 := v_0632 + v_0633  # ring 5 3 qmax [ksi]
v_0635 := v_0632 - v_0633  # ring 5 3 qmin [ksi]
v_0636 := v_0634*((v_0068^3 - v_0070^3)/(3*v_0066) - (v_0068^2 - v_0070^2)/2)
# Peak pressure over full radial strip [kip-in/in]
v_0637 := v_0634*(v_0068^2 - v_0070^2)/(2*v_0066)  # ring 5 3 root shear [kip/in]
v_0638 := sqrt(6*v_0636/(v_0040*v_0035))  # ring 5 3 thickness bending [in]
v_0639 := v_0637/(v_0042*0.58*v_0035)  # ring 5 3 thickness shear [in]
v_0640 := max(v_0638, v_0639, v_0037 + 0.0625)  # Bending, shear and conservative weld-edge allowance; revise/recalculate after selecting thickness [in]
v_0641 := v_0636/v_0034  # Top/bottom weld couple separated conservatively by plate thickness [kip/in]
v_0642 := sqrt((v_0637/2)^2 + v_0641^2)  # Per fillet: half vertical shear + full radial couple force [kip/in]
v_0643 := v_0069 + sqrt(2)*v_0642/(v_0041*0.6*v_0038)  # ring 5 3 weld strength leg [in]
v_0644 := max(v_0643, v_0083)  # Strength and minimum detailing; revise/recalculate after selecting weld [in]
v_0645 := round(16*v_0644, 0)  # Nearest whole number of sixteenths [—]
v_0646 := if(v_0645 ≥ 16*v_0644, v_0645, v_0645 + 1)/16  # Trial leg rounded up to the next 1/16 in [in]
v_0647 := v_0090 + (4 - 1)*v_0006  # ring 5 4 x [in]
v_0648 := v_0090 + (4 - 1.5)*v_0006  # ring 5 4 lo [in]
v_0649 := v_0002  # ring 5 4 hi [in]
v_0650 := v_0649 - v_0648  # ring 5 4 width [in]
v_0651 := v_0650*v_0564*v_0003/1728  # ring 5 4 volume [ft³]
v_0652 := v_0021*v_0651  # ring 5 4 service [kip]
v_0653 := v_0022*v_0652  # ring 5 4 force [kip]
v_0654 := (v_0648 + v_0649)/2 - v_0647  # Retained for whole-wall equilibrium; carried by the wall, not the ring [in]
v_0655 := v_0653*(|v_0654| + v_0011)  # Superseded tributary-eccentricity basis (D-070); comparison only [kip-in]
v_0656 := v_0565*v_0105*v_0110*|v_0647 - v_0107|  # Rigid-body axial redistribution; sign taken to increase the ring force [kip]
v_0657 := v_0653 + v_0656  # ring 5 4 design force [kip]
v_0658 := v_0112/v_0657  # Compare with the kern limit [in]
v_0659 := v_0657/v_0071  # ring 5 4 qavg [ksi]
v_0660 := v_0112*v_0068/v_0072  # ring 5 4 qmoment [ksi]
v_0661 := v_0659 + v_0660  # ring 5 4 qmax [ksi]
v_0662 := v_0659 - v_0660  # ring 5 4 qmin [ksi]
v_0663 := v_0661*((v_0068^3 - v_0070^3)/(3*v_0066) - (v_0068^2 - v_0070^2)/2)
# Peak pressure over full radial strip [kip-in/in]
v_0664 := v_0661*(v_0068^2 - v_0070^2)/(2*v_0066)  # ring 5 4 root shear [kip/in]
v_0665 := sqrt(6*v_0663/(v_0040*v_0035))  # ring 5 4 thickness bending [in]
v_0666 := v_0664/(v_0042*0.58*v_0035)  # ring 5 4 thickness shear [in]
v_0667 := max(v_0665, v_0666, v_0037 + 0.0625)  # Bending, shear and conservative weld-edge allowance; revise/recalculate after selecting thickness [in]
v_0668 := v_0663/v_0034  # Top/bottom weld couple separated conservatively by plate thickness [kip/in]
v_0669 := sqrt((v_0664/2)^2 + v_0668^2)  # Per fillet: half vertical shear + full radial couple force [kip/in]
v_0670 := v_0069 + sqrt(2)*v_0669/(v_0041*0.6*v_0038)  # ring 5 4 weld strength leg [in]
v_0671 := max(v_0670, v_0083)  # Strength and minimum detailing; revise/recalculate after selecting weld [in]
v_0672 := round(16*v_0671, 0)  # Nearest whole number of sixteenths [—]
v_0673 := if(v_0672 ≥ 16*v_0671, v_0672, v_0672 + 1)/16  # Trial leg rounded up to the next 1/16 in [in]
raw_0000 := if(v_0053 > 0, if(v_0049 ≤ v_0053 + 1e-9, "PASS", "FAIL"), "FAIL")
# GRID-A numerical comparison
check_0000 := raw_0000  # GRID-A · Minimum steel, both directions / each face · LRFD 5.10.6-1/-2
raw_0001 := if(v_0051 > 0, if(v_0052 ≤ v_0051 + 1e-9, "PASS", "FAIL"), "FAIL")
# GRID-S numerical comparison
check_0001 := raw_0001  # GRID-S · Grid center spacing · LRFD 5.10.3.2 / 5.10.6; conservative envelope; project cap
raw_0002 := if(v_0055 > 0, if(v_0054 ≤ v_0055 + 1e-9, "PASS", "FAIL"), "FAIL")
# GRID-CLEAR numerical comparison
check_0002 := raw_0002  # GRID-CLEAR · Same-layer clear spacing · LRFD 5.10.3.1.1
raw_0003 := if(v_0016 > 0, if(v_0017 ≤ v_0016 + 1e-9, "PASS", "FAIL"), "FAIL")
# COVER numerical comparison
check_0003 := raw_0003  # COVER · Concrete clear cover · Entered project exposure/cover requirement
raw_0004 := if(v_0030 > 0, if(v_0060 ≤ v_0030 + 1e-9, "PASS", "FAIL"), "FAIL")
# U-LAP numerical comparison
check_0004 := raw_0004  # U-LAP · End U-bar straight leg / Class B lap · LRFD 5.10.8.2.1; 5.10.8.4.3
raw_0005 := if(v_0064 > 0, if(v_0030 ≤ v_0064 + 1e-9, "PASS", "FAIL"), "FAIL")
# U-FIT numerical comparison
check_0005 := raw_0005  # U-FIT · U-bar leg fits wall · Geometric envelope
raw_0006 := if(v_0063 > 0, if(v_0062 ≤ v_0063 + 1e-9, "PASS", "FAIL"), "FAIL")
# U-BEND numerical comparison
check_0006 := raw_0006  # U-BEND · U-bar bend fits thickness · LRFD 5.10.2
raw_0007 := if(v_0031 > 0, if(v_0061 ≤ v_0031 + 1e-9, "PASS", "FAIL"), "FAIL")
# V-LAP numerical comparison
check_0007 := raw_0007  # V-LAP · Vertical Class B lap allowance · LRFD 5.10.8.2.1; 5.10.8.4.3
raw_0008 := if(v_0065 > 0, if(v_0031 ≤ v_0065 + 1e-9, "PASS", "FAIL"), "FAIL")
# V-FIT numerical comparison
check_0008 := raw_0008  # V-FIT · Vertical lap fits height · Geometric envelope
raw_0009 := if(v_0037 > 0, if(v_0083 ≤ v_0037 + 1e-9, "PASS", "FAIL"), "FAIL")
# WELD-MIN numerical comparison
check_0009 := raw_0009  # WELD-MIN · Minimum fillet plus fit-up allowance · LRFD Table 6.13.3.4-1; conservative gap allowance
raw_0010 := if(v_0084 > 0, if(v_0037 ≤ v_0084 + 1e-9, "PASS", "FAIL"), "FAIL")
# WELD-MAX numerical comparison
check_0010 := raw_0010  # WELD-MAX · Maximum fillet at ring edge · LRFD 6.13.3.4
raw_0011 := if(v_0085 > 0, if(v_0086 ≤ v_0085 + 1e-9, "PASS", "FAIL"), "FAIL")
# WELD-LENGTH numerical comparison
check_0011 := raw_0011  # WELD-LENGTH · Minimum effective weld length · LRFD 6.13.3.5
raw_0012 := if(v_0091 > 0, if(v_0017 ≤ v_0091 + 1e-9, "PASS", "FAIL"), "FAIL")
# RING-END numerical comparison
check_0012 := raw_0012  # RING-END · Ring edge / end cover at tolerance · Entered cover and tolerance
raw_0013 := if(v_0092 > 0, if(v_0017 ≤ v_0092 + 1e-9, "PASS", "FAIL"), "FAIL")
# RING-FACE numerical comparison
check_0013 := raw_0013  # RING-FACE · Ring edge / face cover at tolerance · Entered cover and tolerance
raw_0014 := if(v_0093 > 0, if(v_0094 ≤ v_0093 + 1e-9, "PASS", "FAIL"), "FAIL")
# RING-GRID numerical comparison
check_0014 := raw_0014  # RING-GRID · Ring clearance to inner face-grid layer · Placement envelope
raw_0015 := if(v_0095 > 0, if(v_0017 ≤ v_0095 + 1e-9, "PASS", "FAIL"), "FAIL")
# RING-BOTTOM numerical comparison
check_0015 := raw_0015  # RING-BOTTOM · Bottom weld / bottom cover · Entered cover envelope
raw_0016 := if(v_0096 > 0, if(v_0017 ≤ v_0096 + 1e-9, "PASS", "FAIL"), "FAIL")
# RING-TOP numerical comparison
check_0016 := raw_0016  # RING-TOP · Top weld / top cover · Entered cover envelope
raw_0017 := if(v_0097 > 0, if(v_0094 ≤ v_0097 + 1e-9, "PASS", "FAIL"), "FAIL")
# RING-SPACING numerical comparison
check_0017 := raw_0017  # RING-SPACING · Adjacent pile rings / placement clearance · Worst relative pile-placement tolerance
raw_0018 := if(v_0130 > 0, if(v_0131 ≤ v_0130 + 1e-9, "PASS", "FAIL"), "FAIL")
# R1-P1-CONTACT numerical comparison
check_0018 := raw_0018  # R1-P1-CONTACT · Full annular compression contact · Elastic annulus; qmin ≥ 0
raw_0019 := if(v_0073 > 0, if(v_0132 ≤ v_0073 + 1e-9, "PASS", "FAIL"), "FAIL")
# R1-P1-BEAR numerical comparison
check_0019 := if(v_0133 ≥ -1e-10, raw_0019, "PENDING")  # R1-P1-BEAR · Concrete bearing · LRFD 5.6.5; 5.5.4.2, m = 1
raw_0020 := if(v_0074 > 0, if(v_0134 ≤ v_0074 + 1e-9, "PASS", "FAIL"), "FAIL")
# R1-P1-PLATE numerical comparison
check_0020 := if(v_0133 ≥ -1e-10, raw_0020, "PENDING")  # R1-P1-PLATE · Ring elastic bending · Radial cantilever mechanics; LRFD 6.5.4.2
raw_0021 := if(v_0075 > 0, if(v_0135 ≤ v_0075 + 1e-9, "PASS", "FAIL"), "FAIL")
# R1-P1-SHEAR numerical comparison
check_0021 := if(v_0133 ≥ -1e-10, raw_0021, "PENDING")  # R1-P1-SHEAR · Ring shear yielding · LRFD 6.13.5.2
raw_0022 := if(v_0077 > 0, if(v_0140 ≤ v_0077 + 1e-9, "PASS", "FAIL"), "FAIL")
# R1-P1-WELD numerical comparison
check_0022 := if(v_0133 ≥ -1e-10, raw_0022, "PENDING")  # R1-P1-WELD · Each top/bottom continuous fillet · LRFD 6.13.3.2.4; 6.5.4.2
raw_0023 := if(v_0087 > 0, if(v_0140 ≤ v_0087 + 1e-9, "PASS", "FAIL"), "FAIL")
# R1-P1-RING-BASE numerical comparison
check_0023 := if(v_0133 ≥ -1e-10, raw_0023, "PENDING")  # R1-P1-RING-BASE · Ring base metal at weld · LRFD 6.13.5.3
raw_0024 := if(v_0089 > 0, if(v_0140 ≤ v_0089 + 1e-9, "PASS", "FAIL"), "FAIL")
# R1-P1-PIPE-YIELD numerical comparison
check_0024 := if(v_0133 ≥ -1e-10, raw_0024, "PENDING")  # R1-P1-PIPE-YIELD · Pipe shear yielding at weld · LRFD 6.13.5.2; effective pipe wall
raw_0025 := if(v_0088 > 0, if(v_0140 ≤ v_0088 + 1e-9, "PASS", "FAIL"), "FAIL")
# R1-P1-PIPE-BASE numerical comparison
check_0025 := if(v_0133 ≥ -1e-10, raw_0025, "PENDING")  # R1-P1-PIPE-BASE · Pipe base metal at weld · LRFD 6.13.5.3; effective pipe wall
raw_0026 := if(v_0157 > 0, if(v_0158 ≤ v_0157 + 1e-9, "PASS", "FAIL"), "FAIL")
# R1-P2-CONTACT numerical comparison
check_0026 := raw_0026  # R1-P2-CONTACT · Full annular compression contact · Elastic annulus; qmin ≥ 0
raw_0027 := if(v_0073 > 0, if(v_0159 ≤ v_0073 + 1e-9, "PASS", "FAIL"), "FAIL")
# R1-P2-BEAR numerical comparison
check_0027 := if(v_0160 ≥ -1e-10, raw_0027, "PENDING")  # R1-P2-BEAR · Concrete bearing · LRFD 5.6.5; 5.5.4.2, m = 1
raw_0028 := if(v_0074 > 0, if(v_0161 ≤ v_0074 + 1e-9, "PASS", "FAIL"), "FAIL")
# R1-P2-PLATE numerical comparison
check_0028 := if(v_0160 ≥ -1e-10, raw_0028, "PENDING")  # R1-P2-PLATE · Ring elastic bending · Radial cantilever mechanics; LRFD 6.5.4.2
raw_0029 := if(v_0075 > 0, if(v_0162 ≤ v_0075 + 1e-9, "PASS", "FAIL"), "FAIL")
# R1-P2-SHEAR numerical comparison
check_0029 := if(v_0160 ≥ -1e-10, raw_0029, "PENDING")  # R1-P2-SHEAR · Ring shear yielding · LRFD 6.13.5.2
raw_0030 := if(v_0077 > 0, if(v_0167 ≤ v_0077 + 1e-9, "PASS", "FAIL"), "FAIL")
# R1-P2-WELD numerical comparison
check_0030 := if(v_0160 ≥ -1e-10, raw_0030, "PENDING")  # R1-P2-WELD · Each top/bottom continuous fillet · LRFD 6.13.3.2.4; 6.5.4.2
raw_0031 := if(v_0087 > 0, if(v_0167 ≤ v_0087 + 1e-9, "PASS", "FAIL"), "FAIL")
# R1-P2-RING-BASE numerical comparison
check_0031 := if(v_0160 ≥ -1e-10, raw_0031, "PENDING")  # R1-P2-RING-BASE · Ring base metal at weld · LRFD 6.13.5.3
raw_0032 := if(v_0089 > 0, if(v_0167 ≤ v_0089 + 1e-9, "PASS", "FAIL"), "FAIL")
# R1-P2-PIPE-YIELD numerical comparison
check_0032 := if(v_0160 ≥ -1e-10, raw_0032, "PENDING")  # R1-P2-PIPE-YIELD · Pipe shear yielding at weld · LRFD 6.13.5.2; effective pipe wall
raw_0033 := if(v_0088 > 0, if(v_0167 ≤ v_0088 + 1e-9, "PASS", "FAIL"), "FAIL")
# R1-P2-PIPE-BASE numerical comparison
check_0033 := if(v_0160 ≥ -1e-10, raw_0033, "PENDING")  # R1-P2-PIPE-BASE · Pipe base metal at weld · LRFD 6.13.5.3; effective pipe wall
raw_0034 := if(v_0184 > 0, if(v_0185 ≤ v_0184 + 1e-9, "PASS", "FAIL"), "FAIL")
# R1-P3-CONTACT numerical comparison
check_0034 := raw_0034  # R1-P3-CONTACT · Full annular compression contact · Elastic annulus; qmin ≥ 0
raw_0035 := if(v_0073 > 0, if(v_0186 ≤ v_0073 + 1e-9, "PASS", "FAIL"), "FAIL")
# R1-P3-BEAR numerical comparison
check_0035 := if(v_0187 ≥ -1e-10, raw_0035, "PENDING")  # R1-P3-BEAR · Concrete bearing · LRFD 5.6.5; 5.5.4.2, m = 1
raw_0036 := if(v_0074 > 0, if(v_0188 ≤ v_0074 + 1e-9, "PASS", "FAIL"), "FAIL")
# R1-P3-PLATE numerical comparison
check_0036 := if(v_0187 ≥ -1e-10, raw_0036, "PENDING")  # R1-P3-PLATE · Ring elastic bending · Radial cantilever mechanics; LRFD 6.5.4.2
raw_0037 := if(v_0075 > 0, if(v_0189 ≤ v_0075 + 1e-9, "PASS", "FAIL"), "FAIL")
# R1-P3-SHEAR numerical comparison
check_0037 := if(v_0187 ≥ -1e-10, raw_0037, "PENDING")  # R1-P3-SHEAR · Ring shear yielding · LRFD 6.13.5.2
raw_0038 := if(v_0077 > 0, if(v_0194 ≤ v_0077 + 1e-9, "PASS", "FAIL"), "FAIL")
# R1-P3-WELD numerical comparison
check_0038 := if(v_0187 ≥ -1e-10, raw_0038, "PENDING")  # R1-P3-WELD · Each top/bottom continuous fillet · LRFD 6.13.3.2.4; 6.5.4.2
raw_0039 := if(v_0087 > 0, if(v_0194 ≤ v_0087 + 1e-9, "PASS", "FAIL"), "FAIL")
# R1-P3-RING-BASE numerical comparison
check_0039 := if(v_0187 ≥ -1e-10, raw_0039, "PENDING")  # R1-P3-RING-BASE · Ring base metal at weld · LRFD 6.13.5.3
raw_0040 := if(v_0089 > 0, if(v_0194 ≤ v_0089 + 1e-9, "PASS", "FAIL"), "FAIL")
# R1-P3-PIPE-YIELD numerical comparison
check_0040 := if(v_0187 ≥ -1e-10, raw_0040, "PENDING")  # R1-P3-PIPE-YIELD · Pipe shear yielding at weld · LRFD 6.13.5.2; effective pipe wall
raw_0041 := if(v_0088 > 0, if(v_0194 ≤ v_0088 + 1e-9, "PASS", "FAIL"), "FAIL")
# R1-P3-PIPE-BASE numerical comparison
check_0041 := if(v_0187 ≥ -1e-10, raw_0041, "PENDING")  # R1-P3-PIPE-BASE · Pipe base metal at weld · LRFD 6.13.5.3; effective pipe wall
raw_0042 := if(v_0211 > 0, if(v_0212 ≤ v_0211 + 1e-9, "PASS", "FAIL"), "FAIL")
# R1-P4-CONTACT numerical comparison
check_0042 := raw_0042  # R1-P4-CONTACT · Full annular compression contact · Elastic annulus; qmin ≥ 0
raw_0043 := if(v_0073 > 0, if(v_0213 ≤ v_0073 + 1e-9, "PASS", "FAIL"), "FAIL")
# R1-P4-BEAR numerical comparison
check_0043 := if(v_0214 ≥ -1e-10, raw_0043, "PENDING")  # R1-P4-BEAR · Concrete bearing · LRFD 5.6.5; 5.5.4.2, m = 1
raw_0044 := if(v_0074 > 0, if(v_0215 ≤ v_0074 + 1e-9, "PASS", "FAIL"), "FAIL")
# R1-P4-PLATE numerical comparison
check_0044 := if(v_0214 ≥ -1e-10, raw_0044, "PENDING")  # R1-P4-PLATE · Ring elastic bending · Radial cantilever mechanics; LRFD 6.5.4.2
raw_0045 := if(v_0075 > 0, if(v_0216 ≤ v_0075 + 1e-9, "PASS", "FAIL"), "FAIL")
# R1-P4-SHEAR numerical comparison
check_0045 := if(v_0214 ≥ -1e-10, raw_0045, "PENDING")  # R1-P4-SHEAR · Ring shear yielding · LRFD 6.13.5.2
raw_0046 := if(v_0077 > 0, if(v_0221 ≤ v_0077 + 1e-9, "PASS", "FAIL"), "FAIL")
# R1-P4-WELD numerical comparison
check_0046 := if(v_0214 ≥ -1e-10, raw_0046, "PENDING")  # R1-P4-WELD · Each top/bottom continuous fillet · LRFD 6.13.3.2.4; 6.5.4.2
raw_0047 := if(v_0087 > 0, if(v_0221 ≤ v_0087 + 1e-9, "PASS", "FAIL"), "FAIL")
# R1-P4-RING-BASE numerical comparison
check_0047 := if(v_0214 ≥ -1e-10, raw_0047, "PENDING")  # R1-P4-RING-BASE · Ring base metal at weld · LRFD 6.13.5.3
raw_0048 := if(v_0089 > 0, if(v_0221 ≤ v_0089 + 1e-9, "PASS", "FAIL"), "FAIL")
# R1-P4-PIPE-YIELD numerical comparison
check_0048 := if(v_0214 ≥ -1e-10, raw_0048, "PENDING")  # R1-P4-PIPE-YIELD · Pipe shear yielding at weld · LRFD 6.13.5.2; effective pipe wall
raw_0049 := if(v_0088 > 0, if(v_0221 ≤ v_0088 + 1e-9, "PASS", "FAIL"), "FAIL")
# R1-P4-PIPE-BASE numerical comparison
check_0049 := if(v_0214 ≥ -1e-10, raw_0049, "PENDING")  # R1-P4-PIPE-BASE · Pipe base metal at weld · LRFD 6.13.5.3; effective pipe wall
raw_0050 := if(v_0242 > 0, if(v_0243 ≤ v_0242 + 1e-9, "PASS", "FAIL"), "FAIL")
# R2-P1-CONTACT numerical comparison
check_0050 := raw_0050  # R2-P1-CONTACT · Full annular compression contact · Elastic annulus; qmin ≥ 0
raw_0051 := if(v_0073 > 0, if(v_0244 ≤ v_0073 + 1e-9, "PASS", "FAIL"), "FAIL")
# R2-P1-BEAR numerical comparison
check_0051 := if(v_0245 ≥ -1e-10, raw_0051, "PENDING")  # R2-P1-BEAR · Concrete bearing · LRFD 5.6.5; 5.5.4.2, m = 1
raw_0052 := if(v_0074 > 0, if(v_0246 ≤ v_0074 + 1e-9, "PASS", "FAIL"), "FAIL")
# R2-P1-PLATE numerical comparison
check_0052 := if(v_0245 ≥ -1e-10, raw_0052, "PENDING")  # R2-P1-PLATE · Ring elastic bending · Radial cantilever mechanics; LRFD 6.5.4.2
raw_0053 := if(v_0075 > 0, if(v_0247 ≤ v_0075 + 1e-9, "PASS", "FAIL"), "FAIL")
# R2-P1-SHEAR numerical comparison
check_0053 := if(v_0245 ≥ -1e-10, raw_0053, "PENDING")  # R2-P1-SHEAR · Ring shear yielding · LRFD 6.13.5.2
raw_0054 := if(v_0077 > 0, if(v_0252 ≤ v_0077 + 1e-9, "PASS", "FAIL"), "FAIL")
# R2-P1-WELD numerical comparison
check_0054 := if(v_0245 ≥ -1e-10, raw_0054, "PENDING")  # R2-P1-WELD · Each top/bottom continuous fillet · LRFD 6.13.3.2.4; 6.5.4.2
raw_0055 := if(v_0087 > 0, if(v_0252 ≤ v_0087 + 1e-9, "PASS", "FAIL"), "FAIL")
# R2-P1-RING-BASE numerical comparison
check_0055 := if(v_0245 ≥ -1e-10, raw_0055, "PENDING")  # R2-P1-RING-BASE · Ring base metal at weld · LRFD 6.13.5.3
raw_0056 := if(v_0089 > 0, if(v_0252 ≤ v_0089 + 1e-9, "PASS", "FAIL"), "FAIL")
# R2-P1-PIPE-YIELD numerical comparison
check_0056 := if(v_0245 ≥ -1e-10, raw_0056, "PENDING")  # R2-P1-PIPE-YIELD · Pipe shear yielding at weld · LRFD 6.13.5.2; effective pipe wall
raw_0057 := if(v_0088 > 0, if(v_0252 ≤ v_0088 + 1e-9, "PASS", "FAIL"), "FAIL")
# R2-P1-PIPE-BASE numerical comparison
check_0057 := if(v_0245 ≥ -1e-10, raw_0057, "PENDING")  # R2-P1-PIPE-BASE · Pipe base metal at weld · LRFD 6.13.5.3; effective pipe wall
raw_0058 := if(v_0269 > 0, if(v_0270 ≤ v_0269 + 1e-9, "PASS", "FAIL"), "FAIL")
# R2-P2-CONTACT numerical comparison
check_0058 := raw_0058  # R2-P2-CONTACT · Full annular compression contact · Elastic annulus; qmin ≥ 0
raw_0059 := if(v_0073 > 0, if(v_0271 ≤ v_0073 + 1e-9, "PASS", "FAIL"), "FAIL")
# R2-P2-BEAR numerical comparison
check_0059 := if(v_0272 ≥ -1e-10, raw_0059, "PENDING")  # R2-P2-BEAR · Concrete bearing · LRFD 5.6.5; 5.5.4.2, m = 1
raw_0060 := if(v_0074 > 0, if(v_0273 ≤ v_0074 + 1e-9, "PASS", "FAIL"), "FAIL")
# R2-P2-PLATE numerical comparison
check_0060 := if(v_0272 ≥ -1e-10, raw_0060, "PENDING")  # R2-P2-PLATE · Ring elastic bending · Radial cantilever mechanics; LRFD 6.5.4.2
raw_0061 := if(v_0075 > 0, if(v_0274 ≤ v_0075 + 1e-9, "PASS", "FAIL"), "FAIL")
# R2-P2-SHEAR numerical comparison
check_0061 := if(v_0272 ≥ -1e-10, raw_0061, "PENDING")  # R2-P2-SHEAR · Ring shear yielding · LRFD 6.13.5.2
raw_0062 := if(v_0077 > 0, if(v_0279 ≤ v_0077 + 1e-9, "PASS", "FAIL"), "FAIL")
# R2-P2-WELD numerical comparison
check_0062 := if(v_0272 ≥ -1e-10, raw_0062, "PENDING")  # R2-P2-WELD · Each top/bottom continuous fillet · LRFD 6.13.3.2.4; 6.5.4.2
raw_0063 := if(v_0087 > 0, if(v_0279 ≤ v_0087 + 1e-9, "PASS", "FAIL"), "FAIL")
# R2-P2-RING-BASE numerical comparison
check_0063 := if(v_0272 ≥ -1e-10, raw_0063, "PENDING")  # R2-P2-RING-BASE · Ring base metal at weld · LRFD 6.13.5.3
raw_0064 := if(v_0089 > 0, if(v_0279 ≤ v_0089 + 1e-9, "PASS", "FAIL"), "FAIL")
# R2-P2-PIPE-YIELD numerical comparison
check_0064 := if(v_0272 ≥ -1e-10, raw_0064, "PENDING")  # R2-P2-PIPE-YIELD · Pipe shear yielding at weld · LRFD 6.13.5.2; effective pipe wall
raw_0065 := if(v_0088 > 0, if(v_0279 ≤ v_0088 + 1e-9, "PASS", "FAIL"), "FAIL")
# R2-P2-PIPE-BASE numerical comparison
check_0065 := if(v_0272 ≥ -1e-10, raw_0065, "PENDING")  # R2-P2-PIPE-BASE · Pipe base metal at weld · LRFD 6.13.5.3; effective pipe wall
raw_0066 := if(v_0296 > 0, if(v_0297 ≤ v_0296 + 1e-9, "PASS", "FAIL"), "FAIL")
# R2-P3-CONTACT numerical comparison
check_0066 := raw_0066  # R2-P3-CONTACT · Full annular compression contact · Elastic annulus; qmin ≥ 0
raw_0067 := if(v_0073 > 0, if(v_0298 ≤ v_0073 + 1e-9, "PASS", "FAIL"), "FAIL")
# R2-P3-BEAR numerical comparison
check_0067 := if(v_0299 ≥ -1e-10, raw_0067, "PENDING")  # R2-P3-BEAR · Concrete bearing · LRFD 5.6.5; 5.5.4.2, m = 1
raw_0068 := if(v_0074 > 0, if(v_0300 ≤ v_0074 + 1e-9, "PASS", "FAIL"), "FAIL")
# R2-P3-PLATE numerical comparison
check_0068 := if(v_0299 ≥ -1e-10, raw_0068, "PENDING")  # R2-P3-PLATE · Ring elastic bending · Radial cantilever mechanics; LRFD 6.5.4.2
raw_0069 := if(v_0075 > 0, if(v_0301 ≤ v_0075 + 1e-9, "PASS", "FAIL"), "FAIL")
# R2-P3-SHEAR numerical comparison
check_0069 := if(v_0299 ≥ -1e-10, raw_0069, "PENDING")  # R2-P3-SHEAR · Ring shear yielding · LRFD 6.13.5.2
raw_0070 := if(v_0077 > 0, if(v_0306 ≤ v_0077 + 1e-9, "PASS", "FAIL"), "FAIL")
# R2-P3-WELD numerical comparison
check_0070 := if(v_0299 ≥ -1e-10, raw_0070, "PENDING")  # R2-P3-WELD · Each top/bottom continuous fillet · LRFD 6.13.3.2.4; 6.5.4.2
raw_0071 := if(v_0087 > 0, if(v_0306 ≤ v_0087 + 1e-9, "PASS", "FAIL"), "FAIL")
# R2-P3-RING-BASE numerical comparison
check_0071 := if(v_0299 ≥ -1e-10, raw_0071, "PENDING")  # R2-P3-RING-BASE · Ring base metal at weld · LRFD 6.13.5.3
raw_0072 := if(v_0089 > 0, if(v_0306 ≤ v_0089 + 1e-9, "PASS", "FAIL"), "FAIL")
# R2-P3-PIPE-YIELD numerical comparison
check_0072 := if(v_0299 ≥ -1e-10, raw_0072, "PENDING")  # R2-P3-PIPE-YIELD · Pipe shear yielding at weld · LRFD 6.13.5.2; effective pipe wall
raw_0073 := if(v_0088 > 0, if(v_0306 ≤ v_0088 + 1e-9, "PASS", "FAIL"), "FAIL")
# R2-P3-PIPE-BASE numerical comparison
check_0073 := if(v_0299 ≥ -1e-10, raw_0073, "PENDING")  # R2-P3-PIPE-BASE · Pipe base metal at weld · LRFD 6.13.5.3; effective pipe wall
raw_0074 := if(v_0323 > 0, if(v_0324 ≤ v_0323 + 1e-9, "PASS", "FAIL"), "FAIL")
# R2-P4-CONTACT numerical comparison
check_0074 := raw_0074  # R2-P4-CONTACT · Full annular compression contact · Elastic annulus; qmin ≥ 0
raw_0075 := if(v_0073 > 0, if(v_0325 ≤ v_0073 + 1e-9, "PASS", "FAIL"), "FAIL")
# R2-P4-BEAR numerical comparison
check_0075 := if(v_0326 ≥ -1e-10, raw_0075, "PENDING")  # R2-P4-BEAR · Concrete bearing · LRFD 5.6.5; 5.5.4.2, m = 1
raw_0076 := if(v_0074 > 0, if(v_0327 ≤ v_0074 + 1e-9, "PASS", "FAIL"), "FAIL")
# R2-P4-PLATE numerical comparison
check_0076 := if(v_0326 ≥ -1e-10, raw_0076, "PENDING")  # R2-P4-PLATE · Ring elastic bending · Radial cantilever mechanics; LRFD 6.5.4.2
raw_0077 := if(v_0075 > 0, if(v_0328 ≤ v_0075 + 1e-9, "PASS", "FAIL"), "FAIL")
# R2-P4-SHEAR numerical comparison
check_0077 := if(v_0326 ≥ -1e-10, raw_0077, "PENDING")  # R2-P4-SHEAR · Ring shear yielding · LRFD 6.13.5.2
raw_0078 := if(v_0077 > 0, if(v_0333 ≤ v_0077 + 1e-9, "PASS", "FAIL"), "FAIL")
# R2-P4-WELD numerical comparison
check_0078 := if(v_0326 ≥ -1e-10, raw_0078, "PENDING")  # R2-P4-WELD · Each top/bottom continuous fillet · LRFD 6.13.3.2.4; 6.5.4.2
raw_0079 := if(v_0087 > 0, if(v_0333 ≤ v_0087 + 1e-9, "PASS", "FAIL"), "FAIL")
# R2-P4-RING-BASE numerical comparison
check_0079 := if(v_0326 ≥ -1e-10, raw_0079, "PENDING")  # R2-P4-RING-BASE · Ring base metal at weld · LRFD 6.13.5.3
raw_0080 := if(v_0089 > 0, if(v_0333 ≤ v_0089 + 1e-9, "PASS", "FAIL"), "FAIL")
# R2-P4-PIPE-YIELD numerical comparison
check_0080 := if(v_0326 ≥ -1e-10, raw_0080, "PENDING")  # R2-P4-PIPE-YIELD · Pipe shear yielding at weld · LRFD 6.13.5.2; effective pipe wall
raw_0081 := if(v_0088 > 0, if(v_0333 ≤ v_0088 + 1e-9, "PASS", "FAIL"), "FAIL")
# R2-P4-PIPE-BASE numerical comparison
check_0081 := if(v_0326 ≥ -1e-10, raw_0081, "PENDING")  # R2-P4-PIPE-BASE · Pipe base metal at weld · LRFD 6.13.5.3; effective pipe wall
raw_0082 := if(v_0354 > 0, if(v_0355 ≤ v_0354 + 1e-9, "PASS", "FAIL"), "FAIL")
# R3-P1-CONTACT numerical comparison
check_0082 := raw_0082  # R3-P1-CONTACT · Full annular compression contact · Elastic annulus; qmin ≥ 0
raw_0083 := if(v_0073 > 0, if(v_0356 ≤ v_0073 + 1e-9, "PASS", "FAIL"), "FAIL")
# R3-P1-BEAR numerical comparison
check_0083 := if(v_0357 ≥ -1e-10, raw_0083, "PENDING")  # R3-P1-BEAR · Concrete bearing · LRFD 5.6.5; 5.5.4.2, m = 1
raw_0084 := if(v_0074 > 0, if(v_0358 ≤ v_0074 + 1e-9, "PASS", "FAIL"), "FAIL")
# R3-P1-PLATE numerical comparison
check_0084 := if(v_0357 ≥ -1e-10, raw_0084, "PENDING")  # R3-P1-PLATE · Ring elastic bending · Radial cantilever mechanics; LRFD 6.5.4.2
raw_0085 := if(v_0075 > 0, if(v_0359 ≤ v_0075 + 1e-9, "PASS", "FAIL"), "FAIL")
# R3-P1-SHEAR numerical comparison
check_0085 := if(v_0357 ≥ -1e-10, raw_0085, "PENDING")  # R3-P1-SHEAR · Ring shear yielding · LRFD 6.13.5.2
raw_0086 := if(v_0077 > 0, if(v_0364 ≤ v_0077 + 1e-9, "PASS", "FAIL"), "FAIL")
# R3-P1-WELD numerical comparison
check_0086 := if(v_0357 ≥ -1e-10, raw_0086, "PENDING")  # R3-P1-WELD · Each top/bottom continuous fillet · LRFD 6.13.3.2.4; 6.5.4.2
raw_0087 := if(v_0087 > 0, if(v_0364 ≤ v_0087 + 1e-9, "PASS", "FAIL"), "FAIL")
# R3-P1-RING-BASE numerical comparison
check_0087 := if(v_0357 ≥ -1e-10, raw_0087, "PENDING")  # R3-P1-RING-BASE · Ring base metal at weld · LRFD 6.13.5.3
raw_0088 := if(v_0089 > 0, if(v_0364 ≤ v_0089 + 1e-9, "PASS", "FAIL"), "FAIL")
# R3-P1-PIPE-YIELD numerical comparison
check_0088 := if(v_0357 ≥ -1e-10, raw_0088, "PENDING")  # R3-P1-PIPE-YIELD · Pipe shear yielding at weld · LRFD 6.13.5.2; effective pipe wall
raw_0089 := if(v_0088 > 0, if(v_0364 ≤ v_0088 + 1e-9, "PASS", "FAIL"), "FAIL")
# R3-P1-PIPE-BASE numerical comparison
check_0089 := if(v_0357 ≥ -1e-10, raw_0089, "PENDING")  # R3-P1-PIPE-BASE · Pipe base metal at weld · LRFD 6.13.5.3; effective pipe wall
raw_0090 := if(v_0381 > 0, if(v_0382 ≤ v_0381 + 1e-9, "PASS", "FAIL"), "FAIL")
# R3-P2-CONTACT numerical comparison
check_0090 := raw_0090  # R3-P2-CONTACT · Full annular compression contact · Elastic annulus; qmin ≥ 0
raw_0091 := if(v_0073 > 0, if(v_0383 ≤ v_0073 + 1e-9, "PASS", "FAIL"), "FAIL")
# R3-P2-BEAR numerical comparison
check_0091 := if(v_0384 ≥ -1e-10, raw_0091, "PENDING")  # R3-P2-BEAR · Concrete bearing · LRFD 5.6.5; 5.5.4.2, m = 1
raw_0092 := if(v_0074 > 0, if(v_0385 ≤ v_0074 + 1e-9, "PASS", "FAIL"), "FAIL")
# R3-P2-PLATE numerical comparison
check_0092 := if(v_0384 ≥ -1e-10, raw_0092, "PENDING")  # R3-P2-PLATE · Ring elastic bending · Radial cantilever mechanics; LRFD 6.5.4.2
raw_0093 := if(v_0075 > 0, if(v_0386 ≤ v_0075 + 1e-9, "PASS", "FAIL"), "FAIL")
# R3-P2-SHEAR numerical comparison
check_0093 := if(v_0384 ≥ -1e-10, raw_0093, "PENDING")  # R3-P2-SHEAR · Ring shear yielding · LRFD 6.13.5.2
raw_0094 := if(v_0077 > 0, if(v_0391 ≤ v_0077 + 1e-9, "PASS", "FAIL"), "FAIL")
# R3-P2-WELD numerical comparison
check_0094 := if(v_0384 ≥ -1e-10, raw_0094, "PENDING")  # R3-P2-WELD · Each top/bottom continuous fillet · LRFD 6.13.3.2.4; 6.5.4.2
raw_0095 := if(v_0087 > 0, if(v_0391 ≤ v_0087 + 1e-9, "PASS", "FAIL"), "FAIL")
# R3-P2-RING-BASE numerical comparison
check_0095 := if(v_0384 ≥ -1e-10, raw_0095, "PENDING")  # R3-P2-RING-BASE · Ring base metal at weld · LRFD 6.13.5.3
raw_0096 := if(v_0089 > 0, if(v_0391 ≤ v_0089 + 1e-9, "PASS", "FAIL"), "FAIL")
# R3-P2-PIPE-YIELD numerical comparison
check_0096 := if(v_0384 ≥ -1e-10, raw_0096, "PENDING")  # R3-P2-PIPE-YIELD · Pipe shear yielding at weld · LRFD 6.13.5.2; effective pipe wall
raw_0097 := if(v_0088 > 0, if(v_0391 ≤ v_0088 + 1e-9, "PASS", "FAIL"), "FAIL")
# R3-P2-PIPE-BASE numerical comparison
check_0097 := if(v_0384 ≥ -1e-10, raw_0097, "PENDING")  # R3-P2-PIPE-BASE · Pipe base metal at weld · LRFD 6.13.5.3; effective pipe wall
raw_0098 := if(v_0408 > 0, if(v_0409 ≤ v_0408 + 1e-9, "PASS", "FAIL"), "FAIL")
# R3-P3-CONTACT numerical comparison
check_0098 := raw_0098  # R3-P3-CONTACT · Full annular compression contact · Elastic annulus; qmin ≥ 0
raw_0099 := if(v_0073 > 0, if(v_0410 ≤ v_0073 + 1e-9, "PASS", "FAIL"), "FAIL")
# R3-P3-BEAR numerical comparison
check_0099 := if(v_0411 ≥ -1e-10, raw_0099, "PENDING")  # R3-P3-BEAR · Concrete bearing · LRFD 5.6.5; 5.5.4.2, m = 1
raw_0100 := if(v_0074 > 0, if(v_0412 ≤ v_0074 + 1e-9, "PASS", "FAIL"), "FAIL")
# R3-P3-PLATE numerical comparison
check_0100 := if(v_0411 ≥ -1e-10, raw_0100, "PENDING")  # R3-P3-PLATE · Ring elastic bending · Radial cantilever mechanics; LRFD 6.5.4.2
raw_0101 := if(v_0075 > 0, if(v_0413 ≤ v_0075 + 1e-9, "PASS", "FAIL"), "FAIL")
# R3-P3-SHEAR numerical comparison
check_0101 := if(v_0411 ≥ -1e-10, raw_0101, "PENDING")  # R3-P3-SHEAR · Ring shear yielding · LRFD 6.13.5.2
raw_0102 := if(v_0077 > 0, if(v_0418 ≤ v_0077 + 1e-9, "PASS", "FAIL"), "FAIL")
# R3-P3-WELD numerical comparison
check_0102 := if(v_0411 ≥ -1e-10, raw_0102, "PENDING")  # R3-P3-WELD · Each top/bottom continuous fillet · LRFD 6.13.3.2.4; 6.5.4.2
raw_0103 := if(v_0087 > 0, if(v_0418 ≤ v_0087 + 1e-9, "PASS", "FAIL"), "FAIL")
# R3-P3-RING-BASE numerical comparison
check_0103 := if(v_0411 ≥ -1e-10, raw_0103, "PENDING")  # R3-P3-RING-BASE · Ring base metal at weld · LRFD 6.13.5.3
raw_0104 := if(v_0089 > 0, if(v_0418 ≤ v_0089 + 1e-9, "PASS", "FAIL"), "FAIL")
# R3-P3-PIPE-YIELD numerical comparison
check_0104 := if(v_0411 ≥ -1e-10, raw_0104, "PENDING")  # R3-P3-PIPE-YIELD · Pipe shear yielding at weld · LRFD 6.13.5.2; effective pipe wall
raw_0105 := if(v_0088 > 0, if(v_0418 ≤ v_0088 + 1e-9, "PASS", "FAIL"), "FAIL")
# R3-P3-PIPE-BASE numerical comparison
check_0105 := if(v_0411 ≥ -1e-10, raw_0105, "PENDING")  # R3-P3-PIPE-BASE · Pipe base metal at weld · LRFD 6.13.5.3; effective pipe wall
raw_0106 := if(v_0435 > 0, if(v_0436 ≤ v_0435 + 1e-9, "PASS", "FAIL"), "FAIL")
# R3-P4-CONTACT numerical comparison
check_0106 := raw_0106  # R3-P4-CONTACT · Full annular compression contact · Elastic annulus; qmin ≥ 0
raw_0107 := if(v_0073 > 0, if(v_0437 ≤ v_0073 + 1e-9, "PASS", "FAIL"), "FAIL")
# R3-P4-BEAR numerical comparison
check_0107 := if(v_0438 ≥ -1e-10, raw_0107, "PENDING")  # R3-P4-BEAR · Concrete bearing · LRFD 5.6.5; 5.5.4.2, m = 1
raw_0108 := if(v_0074 > 0, if(v_0439 ≤ v_0074 + 1e-9, "PASS", "FAIL"), "FAIL")
# R3-P4-PLATE numerical comparison
check_0108 := if(v_0438 ≥ -1e-10, raw_0108, "PENDING")  # R3-P4-PLATE · Ring elastic bending · Radial cantilever mechanics; LRFD 6.5.4.2
raw_0109 := if(v_0075 > 0, if(v_0440 ≤ v_0075 + 1e-9, "PASS", "FAIL"), "FAIL")
# R3-P4-SHEAR numerical comparison
check_0109 := if(v_0438 ≥ -1e-10, raw_0109, "PENDING")  # R3-P4-SHEAR · Ring shear yielding · LRFD 6.13.5.2
raw_0110 := if(v_0077 > 0, if(v_0445 ≤ v_0077 + 1e-9, "PASS", "FAIL"), "FAIL")
# R3-P4-WELD numerical comparison
check_0110 := if(v_0438 ≥ -1e-10, raw_0110, "PENDING")  # R3-P4-WELD · Each top/bottom continuous fillet · LRFD 6.13.3.2.4; 6.5.4.2
raw_0111 := if(v_0087 > 0, if(v_0445 ≤ v_0087 + 1e-9, "PASS", "FAIL"), "FAIL")
# R3-P4-RING-BASE numerical comparison
check_0111 := if(v_0438 ≥ -1e-10, raw_0111, "PENDING")  # R3-P4-RING-BASE · Ring base metal at weld · LRFD 6.13.5.3
raw_0112 := if(v_0089 > 0, if(v_0445 ≤ v_0089 + 1e-9, "PASS", "FAIL"), "FAIL")
# R3-P4-PIPE-YIELD numerical comparison
check_0112 := if(v_0438 ≥ -1e-10, raw_0112, "PENDING")  # R3-P4-PIPE-YIELD · Pipe shear yielding at weld · LRFD 6.13.5.2; effective pipe wall
raw_0113 := if(v_0088 > 0, if(v_0445 ≤ v_0088 + 1e-9, "PASS", "FAIL"), "FAIL")
# R3-P4-PIPE-BASE numerical comparison
check_0113 := if(v_0438 ≥ -1e-10, raw_0113, "PENDING")  # R3-P4-PIPE-BASE · Pipe base metal at weld · LRFD 6.13.5.3; effective pipe wall
raw_0114 := if(v_0466 > 0, if(v_0467 ≤ v_0466 + 1e-9, "PASS", "FAIL"), "FAIL")
# R4-P1-CONTACT numerical comparison
check_0114 := raw_0114  # R4-P1-CONTACT · Full annular compression contact · Elastic annulus; qmin ≥ 0
raw_0115 := if(v_0073 > 0, if(v_0468 ≤ v_0073 + 1e-9, "PASS", "FAIL"), "FAIL")
# R4-P1-BEAR numerical comparison
check_0115 := if(v_0469 ≥ -1e-10, raw_0115, "PENDING")  # R4-P1-BEAR · Concrete bearing · LRFD 5.6.5; 5.5.4.2, m = 1
raw_0116 := if(v_0074 > 0, if(v_0470 ≤ v_0074 + 1e-9, "PASS", "FAIL"), "FAIL")
# R4-P1-PLATE numerical comparison
check_0116 := if(v_0469 ≥ -1e-10, raw_0116, "PENDING")  # R4-P1-PLATE · Ring elastic bending · Radial cantilever mechanics; LRFD 6.5.4.2
raw_0117 := if(v_0075 > 0, if(v_0471 ≤ v_0075 + 1e-9, "PASS", "FAIL"), "FAIL")
# R4-P1-SHEAR numerical comparison
check_0117 := if(v_0469 ≥ -1e-10, raw_0117, "PENDING")  # R4-P1-SHEAR · Ring shear yielding · LRFD 6.13.5.2
raw_0118 := if(v_0077 > 0, if(v_0476 ≤ v_0077 + 1e-9, "PASS", "FAIL"), "FAIL")
# R4-P1-WELD numerical comparison
check_0118 := if(v_0469 ≥ -1e-10, raw_0118, "PENDING")  # R4-P1-WELD · Each top/bottom continuous fillet · LRFD 6.13.3.2.4; 6.5.4.2
raw_0119 := if(v_0087 > 0, if(v_0476 ≤ v_0087 + 1e-9, "PASS", "FAIL"), "FAIL")
# R4-P1-RING-BASE numerical comparison
check_0119 := if(v_0469 ≥ -1e-10, raw_0119, "PENDING")  # R4-P1-RING-BASE · Ring base metal at weld · LRFD 6.13.5.3
raw_0120 := if(v_0089 > 0, if(v_0476 ≤ v_0089 + 1e-9, "PASS", "FAIL"), "FAIL")
# R4-P1-PIPE-YIELD numerical comparison
check_0120 := if(v_0469 ≥ -1e-10, raw_0120, "PENDING")  # R4-P1-PIPE-YIELD · Pipe shear yielding at weld · LRFD 6.13.5.2; effective pipe wall
raw_0121 := if(v_0088 > 0, if(v_0476 ≤ v_0088 + 1e-9, "PASS", "FAIL"), "FAIL")
# R4-P1-PIPE-BASE numerical comparison
check_0121 := if(v_0469 ≥ -1e-10, raw_0121, "PENDING")  # R4-P1-PIPE-BASE · Pipe base metal at weld · LRFD 6.13.5.3; effective pipe wall
raw_0122 := if(v_0493 > 0, if(v_0494 ≤ v_0493 + 1e-9, "PASS", "FAIL"), "FAIL")
# R4-P2-CONTACT numerical comparison
check_0122 := raw_0122  # R4-P2-CONTACT · Full annular compression contact · Elastic annulus; qmin ≥ 0
raw_0123 := if(v_0073 > 0, if(v_0495 ≤ v_0073 + 1e-9, "PASS", "FAIL"), "FAIL")
# R4-P2-BEAR numerical comparison
check_0123 := if(v_0496 ≥ -1e-10, raw_0123, "PENDING")  # R4-P2-BEAR · Concrete bearing · LRFD 5.6.5; 5.5.4.2, m = 1
raw_0124 := if(v_0074 > 0, if(v_0497 ≤ v_0074 + 1e-9, "PASS", "FAIL"), "FAIL")
# R4-P2-PLATE numerical comparison
check_0124 := if(v_0496 ≥ -1e-10, raw_0124, "PENDING")  # R4-P2-PLATE · Ring elastic bending · Radial cantilever mechanics; LRFD 6.5.4.2
raw_0125 := if(v_0075 > 0, if(v_0498 ≤ v_0075 + 1e-9, "PASS", "FAIL"), "FAIL")
# R4-P2-SHEAR numerical comparison
check_0125 := if(v_0496 ≥ -1e-10, raw_0125, "PENDING")  # R4-P2-SHEAR · Ring shear yielding · LRFD 6.13.5.2
raw_0126 := if(v_0077 > 0, if(v_0503 ≤ v_0077 + 1e-9, "PASS", "FAIL"), "FAIL")
# R4-P2-WELD numerical comparison
check_0126 := if(v_0496 ≥ -1e-10, raw_0126, "PENDING")  # R4-P2-WELD · Each top/bottom continuous fillet · LRFD 6.13.3.2.4; 6.5.4.2
raw_0127 := if(v_0087 > 0, if(v_0503 ≤ v_0087 + 1e-9, "PASS", "FAIL"), "FAIL")
# R4-P2-RING-BASE numerical comparison
check_0127 := if(v_0496 ≥ -1e-10, raw_0127, "PENDING")  # R4-P2-RING-BASE · Ring base metal at weld · LRFD 6.13.5.3
raw_0128 := if(v_0089 > 0, if(v_0503 ≤ v_0089 + 1e-9, "PASS", "FAIL"), "FAIL")
# R4-P2-PIPE-YIELD numerical comparison
check_0128 := if(v_0496 ≥ -1e-10, raw_0128, "PENDING")  # R4-P2-PIPE-YIELD · Pipe shear yielding at weld · LRFD 6.13.5.2; effective pipe wall
raw_0129 := if(v_0088 > 0, if(v_0503 ≤ v_0088 + 1e-9, "PASS", "FAIL"), "FAIL")
# R4-P2-PIPE-BASE numerical comparison
check_0129 := if(v_0496 ≥ -1e-10, raw_0129, "PENDING")  # R4-P2-PIPE-BASE · Pipe base metal at weld · LRFD 6.13.5.3; effective pipe wall
raw_0130 := if(v_0520 > 0, if(v_0521 ≤ v_0520 + 1e-9, "PASS", "FAIL"), "FAIL")
# R4-P3-CONTACT numerical comparison
check_0130 := raw_0130  # R4-P3-CONTACT · Full annular compression contact · Elastic annulus; qmin ≥ 0
raw_0131 := if(v_0073 > 0, if(v_0522 ≤ v_0073 + 1e-9, "PASS", "FAIL"), "FAIL")
# R4-P3-BEAR numerical comparison
check_0131 := if(v_0523 ≥ -1e-10, raw_0131, "PENDING")  # R4-P3-BEAR · Concrete bearing · LRFD 5.6.5; 5.5.4.2, m = 1
raw_0132 := if(v_0074 > 0, if(v_0524 ≤ v_0074 + 1e-9, "PASS", "FAIL"), "FAIL")
# R4-P3-PLATE numerical comparison
check_0132 := if(v_0523 ≥ -1e-10, raw_0132, "PENDING")  # R4-P3-PLATE · Ring elastic bending · Radial cantilever mechanics; LRFD 6.5.4.2
raw_0133 := if(v_0075 > 0, if(v_0525 ≤ v_0075 + 1e-9, "PASS", "FAIL"), "FAIL")
# R4-P3-SHEAR numerical comparison
check_0133 := if(v_0523 ≥ -1e-10, raw_0133, "PENDING")  # R4-P3-SHEAR · Ring shear yielding · LRFD 6.13.5.2
raw_0134 := if(v_0077 > 0, if(v_0530 ≤ v_0077 + 1e-9, "PASS", "FAIL"), "FAIL")
# R4-P3-WELD numerical comparison
check_0134 := if(v_0523 ≥ -1e-10, raw_0134, "PENDING")  # R4-P3-WELD · Each top/bottom continuous fillet · LRFD 6.13.3.2.4; 6.5.4.2
raw_0135 := if(v_0087 > 0, if(v_0530 ≤ v_0087 + 1e-9, "PASS", "FAIL"), "FAIL")
# R4-P3-RING-BASE numerical comparison
check_0135 := if(v_0523 ≥ -1e-10, raw_0135, "PENDING")  # R4-P3-RING-BASE · Ring base metal at weld · LRFD 6.13.5.3
raw_0136 := if(v_0089 > 0, if(v_0530 ≤ v_0089 + 1e-9, "PASS", "FAIL"), "FAIL")
# R4-P3-PIPE-YIELD numerical comparison
check_0136 := if(v_0523 ≥ -1e-10, raw_0136, "PENDING")  # R4-P3-PIPE-YIELD · Pipe shear yielding at weld · LRFD 6.13.5.2; effective pipe wall
raw_0137 := if(v_0088 > 0, if(v_0530 ≤ v_0088 + 1e-9, "PASS", "FAIL"), "FAIL")
# R4-P3-PIPE-BASE numerical comparison
check_0137 := if(v_0523 ≥ -1e-10, raw_0137, "PENDING")  # R4-P3-PIPE-BASE · Pipe base metal at weld · LRFD 6.13.5.3; effective pipe wall
raw_0138 := if(v_0547 > 0, if(v_0548 ≤ v_0547 + 1e-9, "PASS", "FAIL"), "FAIL")
# R4-P4-CONTACT numerical comparison
check_0138 := raw_0138  # R4-P4-CONTACT · Full annular compression contact · Elastic annulus; qmin ≥ 0
raw_0139 := if(v_0073 > 0, if(v_0549 ≤ v_0073 + 1e-9, "PASS", "FAIL"), "FAIL")
# R4-P4-BEAR numerical comparison
check_0139 := if(v_0550 ≥ -1e-10, raw_0139, "PENDING")  # R4-P4-BEAR · Concrete bearing · LRFD 5.6.5; 5.5.4.2, m = 1
raw_0140 := if(v_0074 > 0, if(v_0551 ≤ v_0074 + 1e-9, "PASS", "FAIL"), "FAIL")
# R4-P4-PLATE numerical comparison
check_0140 := if(v_0550 ≥ -1e-10, raw_0140, "PENDING")  # R4-P4-PLATE · Ring elastic bending · Radial cantilever mechanics; LRFD 6.5.4.2
raw_0141 := if(v_0075 > 0, if(v_0552 ≤ v_0075 + 1e-9, "PASS", "FAIL"), "FAIL")
# R4-P4-SHEAR numerical comparison
check_0141 := if(v_0550 ≥ -1e-10, raw_0141, "PENDING")  # R4-P4-SHEAR · Ring shear yielding · LRFD 6.13.5.2
raw_0142 := if(v_0077 > 0, if(v_0557 ≤ v_0077 + 1e-9, "PASS", "FAIL"), "FAIL")
# R4-P4-WELD numerical comparison
check_0142 := if(v_0550 ≥ -1e-10, raw_0142, "PENDING")  # R4-P4-WELD · Each top/bottom continuous fillet · LRFD 6.13.3.2.4; 6.5.4.2
raw_0143 := if(v_0087 > 0, if(v_0557 ≤ v_0087 + 1e-9, "PASS", "FAIL"), "FAIL")
# R4-P4-RING-BASE numerical comparison
check_0143 := if(v_0550 ≥ -1e-10, raw_0143, "PENDING")  # R4-P4-RING-BASE · Ring base metal at weld · LRFD 6.13.5.3
raw_0144 := if(v_0089 > 0, if(v_0557 ≤ v_0089 + 1e-9, "PASS", "FAIL"), "FAIL")
# R4-P4-PIPE-YIELD numerical comparison
check_0144 := if(v_0550 ≥ -1e-10, raw_0144, "PENDING")  # R4-P4-PIPE-YIELD · Pipe shear yielding at weld · LRFD 6.13.5.2; effective pipe wall
raw_0145 := if(v_0088 > 0, if(v_0557 ≤ v_0088 + 1e-9, "PASS", "FAIL"), "FAIL")
# R4-P4-PIPE-BASE numerical comparison
check_0145 := if(v_0550 ≥ -1e-10, raw_0145, "PENDING")  # R4-P4-PIPE-BASE · Pipe base metal at weld · LRFD 6.13.5.3; effective pipe wall
raw_0146 := if(v_0578 > 0, if(v_0579 ≤ v_0578 + 1e-9, "PASS", "FAIL"), "FAIL")
# R5-P1-CONTACT numerical comparison
check_0146 := raw_0146  # R5-P1-CONTACT · Full annular compression contact · Elastic annulus; qmin ≥ 0
raw_0147 := if(v_0073 > 0, if(v_0580 ≤ v_0073 + 1e-9, "PASS", "FAIL"), "FAIL")
# R5-P1-BEAR numerical comparison
check_0147 := if(v_0581 ≥ -1e-10, raw_0147, "PENDING")  # R5-P1-BEAR · Concrete bearing · LRFD 5.6.5; 5.5.4.2, m = 1
raw_0148 := if(v_0074 > 0, if(v_0582 ≤ v_0074 + 1e-9, "PASS", "FAIL"), "FAIL")
# R5-P1-PLATE numerical comparison
check_0148 := if(v_0581 ≥ -1e-10, raw_0148, "PENDING")  # R5-P1-PLATE · Ring elastic bending · Radial cantilever mechanics; LRFD 6.5.4.2
raw_0149 := if(v_0075 > 0, if(v_0583 ≤ v_0075 + 1e-9, "PASS", "FAIL"), "FAIL")
# R5-P1-SHEAR numerical comparison
check_0149 := if(v_0581 ≥ -1e-10, raw_0149, "PENDING")  # R5-P1-SHEAR · Ring shear yielding · LRFD 6.13.5.2
raw_0150 := if(v_0077 > 0, if(v_0588 ≤ v_0077 + 1e-9, "PASS", "FAIL"), "FAIL")
# R5-P1-WELD numerical comparison
check_0150 := if(v_0581 ≥ -1e-10, raw_0150, "PENDING")  # R5-P1-WELD · Each top/bottom continuous fillet · LRFD 6.13.3.2.4; 6.5.4.2
raw_0151 := if(v_0087 > 0, if(v_0588 ≤ v_0087 + 1e-9, "PASS", "FAIL"), "FAIL")
# R5-P1-RING-BASE numerical comparison
check_0151 := if(v_0581 ≥ -1e-10, raw_0151, "PENDING")  # R5-P1-RING-BASE · Ring base metal at weld · LRFD 6.13.5.3
raw_0152 := if(v_0089 > 0, if(v_0588 ≤ v_0089 + 1e-9, "PASS", "FAIL"), "FAIL")
# R5-P1-PIPE-YIELD numerical comparison
check_0152 := if(v_0581 ≥ -1e-10, raw_0152, "PENDING")  # R5-P1-PIPE-YIELD · Pipe shear yielding at weld · LRFD 6.13.5.2; effective pipe wall
raw_0153 := if(v_0088 > 0, if(v_0588 ≤ v_0088 + 1e-9, "PASS", "FAIL"), "FAIL")
# R5-P1-PIPE-BASE numerical comparison
check_0153 := if(v_0581 ≥ -1e-10, raw_0153, "PENDING")  # R5-P1-PIPE-BASE · Pipe base metal at weld · LRFD 6.13.5.3; effective pipe wall
raw_0154 := if(v_0605 > 0, if(v_0606 ≤ v_0605 + 1e-9, "PASS", "FAIL"), "FAIL")
# R5-P2-CONTACT numerical comparison
check_0154 := raw_0154  # R5-P2-CONTACT · Full annular compression contact · Elastic annulus; qmin ≥ 0
raw_0155 := if(v_0073 > 0, if(v_0607 ≤ v_0073 + 1e-9, "PASS", "FAIL"), "FAIL")
# R5-P2-BEAR numerical comparison
check_0155 := if(v_0608 ≥ -1e-10, raw_0155, "PENDING")  # R5-P2-BEAR · Concrete bearing · LRFD 5.6.5; 5.5.4.2, m = 1
raw_0156 := if(v_0074 > 0, if(v_0609 ≤ v_0074 + 1e-9, "PASS", "FAIL"), "FAIL")
# R5-P2-PLATE numerical comparison
check_0156 := if(v_0608 ≥ -1e-10, raw_0156, "PENDING")  # R5-P2-PLATE · Ring elastic bending · Radial cantilever mechanics; LRFD 6.5.4.2
raw_0157 := if(v_0075 > 0, if(v_0610 ≤ v_0075 + 1e-9, "PASS", "FAIL"), "FAIL")
# R5-P2-SHEAR numerical comparison
check_0157 := if(v_0608 ≥ -1e-10, raw_0157, "PENDING")  # R5-P2-SHEAR · Ring shear yielding · LRFD 6.13.5.2
raw_0158 := if(v_0077 > 0, if(v_0615 ≤ v_0077 + 1e-9, "PASS", "FAIL"), "FAIL")
# R5-P2-WELD numerical comparison
check_0158 := if(v_0608 ≥ -1e-10, raw_0158, "PENDING")  # R5-P2-WELD · Each top/bottom continuous fillet · LRFD 6.13.3.2.4; 6.5.4.2
raw_0159 := if(v_0087 > 0, if(v_0615 ≤ v_0087 + 1e-9, "PASS", "FAIL"), "FAIL")
# R5-P2-RING-BASE numerical comparison
check_0159 := if(v_0608 ≥ -1e-10, raw_0159, "PENDING")  # R5-P2-RING-BASE · Ring base metal at weld · LRFD 6.13.5.3
raw_0160 := if(v_0089 > 0, if(v_0615 ≤ v_0089 + 1e-9, "PASS", "FAIL"), "FAIL")
# R5-P2-PIPE-YIELD numerical comparison
check_0160 := if(v_0608 ≥ -1e-10, raw_0160, "PENDING")  # R5-P2-PIPE-YIELD · Pipe shear yielding at weld · LRFD 6.13.5.2; effective pipe wall
raw_0161 := if(v_0088 > 0, if(v_0615 ≤ v_0088 + 1e-9, "PASS", "FAIL"), "FAIL")
# R5-P2-PIPE-BASE numerical comparison
check_0161 := if(v_0608 ≥ -1e-10, raw_0161, "PENDING")  # R5-P2-PIPE-BASE · Pipe base metal at weld · LRFD 6.13.5.3; effective pipe wall
raw_0162 := if(v_0632 > 0, if(v_0633 ≤ v_0632 + 1e-9, "PASS", "FAIL"), "FAIL")
# R5-P3-CONTACT numerical comparison
check_0162 := raw_0162  # R5-P3-CONTACT · Full annular compression contact · Elastic annulus; qmin ≥ 0
raw_0163 := if(v_0073 > 0, if(v_0634 ≤ v_0073 + 1e-9, "PASS", "FAIL"), "FAIL")
# R5-P3-BEAR numerical comparison
check_0163 := if(v_0635 ≥ -1e-10, raw_0163, "PENDING")  # R5-P3-BEAR · Concrete bearing · LRFD 5.6.5; 5.5.4.2, m = 1
raw_0164 := if(v_0074 > 0, if(v_0636 ≤ v_0074 + 1e-9, "PASS", "FAIL"), "FAIL")
# R5-P3-PLATE numerical comparison
check_0164 := if(v_0635 ≥ -1e-10, raw_0164, "PENDING")  # R5-P3-PLATE · Ring elastic bending · Radial cantilever mechanics; LRFD 6.5.4.2
raw_0165 := if(v_0075 > 0, if(v_0637 ≤ v_0075 + 1e-9, "PASS", "FAIL"), "FAIL")
# R5-P3-SHEAR numerical comparison
check_0165 := if(v_0635 ≥ -1e-10, raw_0165, "PENDING")  # R5-P3-SHEAR · Ring shear yielding · LRFD 6.13.5.2
raw_0166 := if(v_0077 > 0, if(v_0642 ≤ v_0077 + 1e-9, "PASS", "FAIL"), "FAIL")
# R5-P3-WELD numerical comparison
check_0166 := if(v_0635 ≥ -1e-10, raw_0166, "PENDING")  # R5-P3-WELD · Each top/bottom continuous fillet · LRFD 6.13.3.2.4; 6.5.4.2
raw_0167 := if(v_0087 > 0, if(v_0642 ≤ v_0087 + 1e-9, "PASS", "FAIL"), "FAIL")
# R5-P3-RING-BASE numerical comparison
check_0167 := if(v_0635 ≥ -1e-10, raw_0167, "PENDING")  # R5-P3-RING-BASE · Ring base metal at weld · LRFD 6.13.5.3
raw_0168 := if(v_0089 > 0, if(v_0642 ≤ v_0089 + 1e-9, "PASS", "FAIL"), "FAIL")
# R5-P3-PIPE-YIELD numerical comparison
check_0168 := if(v_0635 ≥ -1e-10, raw_0168, "PENDING")  # R5-P3-PIPE-YIELD · Pipe shear yielding at weld · LRFD 6.13.5.2; effective pipe wall
raw_0169 := if(v_0088 > 0, if(v_0642 ≤ v_0088 + 1e-9, "PASS", "FAIL"), "FAIL")
# R5-P3-PIPE-BASE numerical comparison
check_0169 := if(v_0635 ≥ -1e-10, raw_0169, "PENDING")  # R5-P3-PIPE-BASE · Pipe base metal at weld · LRFD 6.13.5.3; effective pipe wall
raw_0170 := if(v_0659 > 0, if(v_0660 ≤ v_0659 + 1e-9, "PASS", "FAIL"), "FAIL")
# R5-P4-CONTACT numerical comparison
check_0170 := raw_0170  # R5-P4-CONTACT · Full annular compression contact · Elastic annulus; qmin ≥ 0
raw_0171 := if(v_0073 > 0, if(v_0661 ≤ v_0073 + 1e-9, "PASS", "FAIL"), "FAIL")
# R5-P4-BEAR numerical comparison
check_0171 := if(v_0662 ≥ -1e-10, raw_0171, "PENDING")  # R5-P4-BEAR · Concrete bearing · LRFD 5.6.5; 5.5.4.2, m = 1
raw_0172 := if(v_0074 > 0, if(v_0663 ≤ v_0074 + 1e-9, "PASS", "FAIL"), "FAIL")
# R5-P4-PLATE numerical comparison
check_0172 := if(v_0662 ≥ -1e-10, raw_0172, "PENDING")  # R5-P4-PLATE · Ring elastic bending · Radial cantilever mechanics; LRFD 6.5.4.2
raw_0173 := if(v_0075 > 0, if(v_0664 ≤ v_0075 + 1e-9, "PASS", "FAIL"), "FAIL")
# R5-P4-SHEAR numerical comparison
check_0173 := if(v_0662 ≥ -1e-10, raw_0173, "PENDING")  # R5-P4-SHEAR · Ring shear yielding · LRFD 6.13.5.2
raw_0174 := if(v_0077 > 0, if(v_0669 ≤ v_0077 + 1e-9, "PASS", "FAIL"), "FAIL")
# R5-P4-WELD numerical comparison
check_0174 := if(v_0662 ≥ -1e-10, raw_0174, "PENDING")  # R5-P4-WELD · Each top/bottom continuous fillet · LRFD 6.13.3.2.4; 6.5.4.2
raw_0175 := if(v_0087 > 0, if(v_0669 ≤ v_0087 + 1e-9, "PASS", "FAIL"), "FAIL")
# R5-P4-RING-BASE numerical comparison
check_0175 := if(v_0662 ≥ -1e-10, raw_0175, "PENDING")  # R5-P4-RING-BASE · Ring base metal at weld · LRFD 6.13.5.3
raw_0176 := if(v_0089 > 0, if(v_0669 ≤ v_0089 + 1e-9, "PASS", "FAIL"), "FAIL")
# R5-P4-PIPE-YIELD numerical comparison
check_0176 := if(v_0662 ≥ -1e-10, raw_0176, "PENDING")  # R5-P4-PIPE-YIELD · Pipe shear yielding at weld · LRFD 6.13.5.2; effective pipe wall
raw_0177 := if(v_0088 > 0, if(v_0669 ≤ v_0088 + 1e-9, "PASS", "FAIL"), "FAIL")
# R5-P4-PIPE-BASE numerical comparison
check_0177 := if(v_0662 ≥ -1e-10, raw_0177, "PENDING")  # R5-P4-PIPE-BASE · Pipe base metal at weld · LRFD 6.13.5.3; effective pipe wall
